// SBML level 3 version 1

model cell_cycle_v3_2_0()
  // model units - substance: substance, time: second, volume: volume, area: area, length: metre, extent: substance

  // Compartments:
  compartment cell = 1 volume;

  // Species:
  substanceOnly species _cell__CCND in cell = 3.857237*cell;
  substanceOnly species _cell__CCNE_CDKN1A_B_ in cell = 0.366015703*cell;
  substanceOnly species _cell__E2F_DBD_RB1_Ser332u_ in cell = 0.099199998*cell;
  substanceOnly species _cell__E2F_DBD_RB1_Ser332p_ in cell = 0.034799999*cell;
  substanceOnly species _cell__CCNA_CDKN1A_B_ in cell = 0.055205093*cell;
  substanceOnly species _cell__CCNB_CDK1_Thr14_Tyr15u_CDKN1A_ in cell = 0.236008538*cell;
  substanceOnly species _cell__E2F_DBD_RB1_1_Ser332u__RB1_E2F_1_Ser807_Ser811u_ in cell = 0.208999997*cell;
  substanceOnly species _cell__E2F_DBD_RB1_1_Ser332p__RB1_E2F_1_Ser807_Ser811u_ in cell = 0.046737014*cell;
  substanceOnly species _cell__RB1_E2F_Ser807_Ser811u_ in cell = 0.729492942*cell;
  substanceOnly species _cell__RB1_E2F_Ser807_Ser811p_ in cell = 3.096244*cell;
  substanceOnly species _cell__PPP2R2B_ENSA_ARPP19_ in cell = 0.001150224*cell;
  substanceOnly species _cell__APC_FBXO5_FZR1_CDC20_Ser355u_ in cell = 36.19063*cell;
  substanceOnly species _cell__CDC20_APC_ in cell = 0.021600039*cell;
  substanceOnly species _cell__APC_FBXO5_FZR1_CDC20_1_Ser355p__CDC20_APC_1_ in cell = 0.132083079*cell;
  substanceOnly species _cell__APC_FBXO5_FZR1_CDC20_Ser355p_ in cell = 4.14241*cell;
  substanceOnly species _cell__APC_FBXO5_FZR1_CDC20_1_Ser355u__FZR1_APC_1_FBXO5_nTermu_ in cell = 0.239893982*cell;
  substanceOnly species _cell__FZR1_APC_FBXO5_nTermu_ in cell = 0.0207*cell;
  substanceOnly species _cell__FZR1_APC_FBXO5_nTermp_ in cell = 0.091360525*cell;
  substanceOnly species _cell__APC_FBXO5_1_FZR1_CDC20_2_Ser355u__FBXO5_APC_1_FZR1_3_Ser182u__FZR1_APC_2_FBXO5_3_nTermu_ in cell = 0.015962941*cell;
  substanceOnly species _cell__FBXO5_APC_FZR1_Ser182u_ in cell = 0.492130281*cell;
  substanceOnly species _cell__APC_FBXO5_1_FZR1_CDC20_2_Ser355p__FBXO5_APC_1_FZR1_3_Ser182u__FZR1_APC_2_FBXO5_3_nTermu_ in cell = 0.103999998*cell;
  substanceOnly species _cell__APC_FBXO5_FZR1_CDC20_1_Ser355p__FZR1_APC_1_FBXO5_nTermu_ in cell = 0.019437575*cell;
  substanceOnly species _cell__FBXO5_APC_FZR1_Ser182p_ in cell = 0.026115125*cell;
  substanceOnly species _cell__FOXM1_DBD_Thr600u_ in cell = 0.003940009*cell;
  substanceOnly species _cell__FOXM1_DBD_Thr600p_ in cell = 0.062900115*cell;
  substanceOnly species _cell__CCNB_promoter_FOXM1_1__FOXM1_DBD_1_Thr600p_ in cell = 1.9e-7*cell;
  substanceOnly species _cell__CCNB_promoter_FOXM1_ in cell = 0.0001*cell;
  substanceOnly species _cell__CDC20_promoter_FOXM1_ in cell = 0.0001*cell;
  substanceOnly species _cell__CDC20_promoter_FOXM1_1__FOXM1_DBD_1_Thr600p_ in cell = 0;
  substanceOnly species _cell__WEE1_Ser123u_ in cell = 0.263482622*cell;
  substanceOnly species _cell__CCNB_CDK1_Thr14_Tyr15p_CDKN1A_ in cell = 0.002167134*cell;
  substanceOnly species _cell__WEE1_Ser123p_ in cell = 6.381712*cell;
  substanceOnly species _cell__CDC25_pSitesp_ in cell = 0.186941482*cell;
  substanceOnly species _cell__CDC25_pSitesu_ in cell = 0.007048923*cell;
  substanceOnly species _cell__MASTL_Thr198u_ in cell = 0.060676609*cell;
  substanceOnly species _cell__MASTL_Thr198p_ in cell = 3.084643*cell;
  substanceOnly species _cell__ENSA_ARPP19_PPP2R2B_Ser62_Ser67u_ in cell = 2.862085*cell;
  substanceOnly species _cell__ENSA_ARPP19_PPP2R2B_Ser62_Ser67p_ in cell = 0.968695703*cell;
  substanceOnly species _cell__ENSA_ARPP19_PPP2R2B_1_Ser62_Ser67p__PPP2R2B_ENSA_ARPP19_1_ in cell = 0.265177693*cell;
  substanceOnly species _cell__CCNE_promoter_E2F_ in cell = 0.0001*cell;
  substanceOnly species _cell__CCNA_promoter_E2F_ in cell = 0.0001*cell;
  substanceOnly species _cell__E2F_promoter_E2F_ in cell = 0.0001*cell;
  substanceOnly species _cell__FBXO5_promoter_E2F_ in cell = 0.0001*cell;
  substanceOnly species _cell__FOXM1_promoter_E2F_ in cell = 0.0001*cell;
  substanceOnly species _cell__CCNE_promoter_E2F_1__E2F_DBD_1_RB1_Ser332u_ in cell = 0;
  substanceOnly species _cell__CCNA_promoter_E2F_1__E2F_DBD_1_RB1_Ser332u_ in cell = 0;
  substanceOnly species _cell__E2F_DBD_1_RB1_Ser332u__E2F_promoter_E2F_1_ in cell = 0;
  substanceOnly species _cell__E2F_DBD_1_RB1_Ser332u__FBXO5_promoter_E2F_1_ in cell = 0;
  substanceOnly species _cell__E2F_DBD_1_RB1_Ser332u__FOXM1_promoter_E2F_1_ in cell = 0;
  substanceOnly species _cell__CCNE_promoter_E2F_1__E2F_DBD_1_RB1_Ser332p_ in cell = 0;
  substanceOnly species _cell__CCNA_promoter_E2F_1__E2F_DBD_1_RB1_Ser332p_ in cell = 0;
  substanceOnly species _cell__E2F_DBD_1_RB1_Ser332p__E2F_promoter_E2F_1_ in cell = 0;
  substanceOnly species _cell__E2F_DBD_1_RB1_Ser332p__FBXO5_promoter_E2F_1_ in cell = 0;
  substanceOnly species _cell__E2F_DBD_1_RB1_Ser332p__FOXM1_promoter_E2F_1_ in cell = 0;
  substanceOnly species _cell__SKP2 in cell = 1*cell;
  substanceOnly species _cell__TP53_DBD_Ser15p_ in cell = 0;
  substanceOnly species _cell__CDKN1A_promoter_TP53_ in cell = 0.0001*cell;
  substanceOnly species _cell__FOXO_DBD_ in cell = 1*cell;
  substanceOnly species _cell__CDKN1B_promoter_FOXO_ in cell = 0.0001*cell;
  substanceOnly species _cell__CDKN1A_promoter_TP53_1__TP53_DBD_1_Ser15p_ in cell = 0;
  substanceOnly species _cell__CDKN1A_CCNE_A_B_Ser130u_ in cell = 0.173668515*cell;
  substanceOnly species _cell__CDKN1B_promoter_FOXO_1__FOXO_DBD_1_ in cell = 0;
  substanceOnly species _cell__CDKN1B_CCNE_A_Thr187u_ in cell = 0.021533874*cell;
  substanceOnly species _cell__CCNA_CDKN1A_B_1__CDKN1A_CCNE_A_B_1_Ser130u_ in cell = 0.045916081*cell;
  substanceOnly species _cell__CCNE_CDKN1A_B_1__CDKN1A_CCNE_A_B_1_Ser130u_ in cell = 0.00049177*cell;
  substanceOnly species _cell__CCNB_CDK1_Thr14_Tyr15u_CDKN1A_1__CDKN1A_CCNE_A_B_1_Ser130u_ in cell = 0.069994412*cell;
  substanceOnly species _cell__CCNB_CDK1_Thr14_Tyr15p_CDKN1A_1__CDKN1A_CCNE_A_B_1_Ser130u_ in cell = 0.003069893*cell;
  substanceOnly species _cell__CDKN1A_CCNE_A_B_Ser130p_ in cell = 0.099828935*cell;
  substanceOnly species _cell__CCNA_CDKN1A_B_1__CDKN1B_CCNE_A_1_Thr187u_ in cell = 0.028384822*cell;
  substanceOnly species _cell__CCNE_CDKN1A_B_1__CDKN1B_CCNE_A_1_Thr187u_ in cell = 0.003409842*cell;
  substanceOnly species _cell__CDKN1B_CCNE_A_Thr187p_ in cell = 0.090063602*cell;
  substanceOnly species _cell__CCNA_CDKN1A_B_1__CDKN1B_CCNE_A_1_Thr187p_ in cell = 0.033142717*cell;
  substanceOnly species _cell__CCNE_CDKN1A_B_1__CDKN1B_CCNE_A_1_Thr187p_ in cell = 0.005444253*cell;

  // Parameters:
  kPhRbD = 0.001088481;
  kPhRbE = 0.026024343;
  kDpRb = 0.0057882;
  kPhRb = 0.023155243;
  kSyCe1 = 0.000139498;
  kSyCe2 = 1.045823;
  kDeCe = 0.000979552;
  kDiE2fRb = 7.53501e-5;
  kAsE2fRb = 0.597101762;
  kSyE2f1 = 6.30687e-5;
  kSyE2f2 = 6.64568184;
  kDeE2f1 = 3.31498e-5;
  kDeE2f2 = 0.001508046;
  kPhE2f = 0.004546695;
  kDpE2f2 = 0.076167436;
  kSyEmi1 = 0.000322045;
  kSyEmi2 = 15.32671;
  kDeEmi1 = 1.64574e-5;
  kDeEmi2 = 0.001060284;
  kDeEmi3 = 0.01375476;
  kPhEmiA = 3.79063e-7;
  kPhEmiB = 0.002768967;
  kDpEmi = 4.26272e-8;
  kSyCa1 = 6.46385e-6;
  kSyCa2 = 0.139555845;
  kDeCa1 = 6.93149e-8;
  kDeCa2 = 0.002290617;
  kDeCa3 = 0.004191463;
  kDpCdh = 0.002529724;
  kPhCdhA = 0.003687191;
  kPhCdhE = 6.93e-5;
  kPhCdhB = 0.002543414;
  kDiACE = 0.00178481;
  kAsACE = 0.035977865;
  kDiACdh = 3.47e-6;
  kAsACdh = 0.003859147;
  kPhCeA = 6.93001e-5;
  kPhCeE = 0.000693001;
  kPhFoxE = 6.93e-6;
  kPhFoxA = 5.28592e-5;
  kPhFoxB = 0.005815083;
  kDpFox = 2.04339e-5;
  kSyCb1 = 6.20973e-6;
  kSyCb2 = 0.38857712;
  kDeCb1 = 6.31596e-6;
  kDeCb2 = 0.000155053;
  kDeCb3 = 0.001019924;
  kPhEnsa = 0.000169614;
  kDpEnsa = 0.001595053;
  kPhGw = 0.003018672;
  kDpGw1 = 0.003052087;
  kDpGw2 = 0.012744545;
  kWee1 = 6.94414e-7;
  kWee2 = 0.001065984;
  kPhWeeA = 0.000834151;
  kPhWeeB = 0.071921364;
  kDpWee = 0.068578828;
  kCdc25_1 = 2.71514e-5;
  kCdc25_2 = 0.021452792;
  kDpCdc25 = 0.024031313;
  kDipEB55 = 4.71e-7;
  kAspEB55 = 3.950104;
  kSyCdc_1 = 2.11115e-6;
  kSyCdc_2 = 5.2574;
  kDeCdc_1 = 2.77e-7;
  kDeCdc_2 = 2.77027e-6;
  kDipACdc = 1.08437e-5;
  kAspACdc = 0.003623498;
  kPhApcA = 0.000693001;
  kDpApc_1 = 0;
  kDpApc_2 = 2.586986;
  kSyFox1 = 7.09943e-7;
  kSyFox2 = 0.052755808;
  kDeFox1 = 8.71115e-7;
  kDeFox2 = 0.030644773;
  kAsEPx = 0.039441855;
  kDiEPx = 0.010007457;
  kAsFPcb = 0.43202553;
  kDiFPcb = 0.028463248;
  kAsFPcdc = 0.034996662;
  kDiFPcdc = 0.191486631;
  kPhC25B = 0.018451055;
  kPhCAEE = 0.00454289;
  kPhCAEA = 0.020747153;
  kPhCAEB = 0.082332189;
  kDpE2f1 = 0;
  kPhC25A = 0;
  kSySkp2 = 0.000485827;
  kDeSkp2_1 = 0.000340855;
  kDeSkp2_2 = 0.029577557;
  kAsTP53PCDKN1A = 0.486795757;
  kDiTP53PCDKN1A = 0.095030071;
  kSyCDKN1A_1 = 7.6538e-5;
  kSyCDKN1A_2 = 2.79194512;
  kDeCDKN1A_1 = 0.000413049;
  kDeCDKN1A_2 = 0.00025;
  kAsCdkn1aC = 0.062723053;
  kDiCdkn1aC = 0.000380578;
  kPhCDKN1AByCe = 5.02071e-5;
  kPhCDKN1AByCa = 0.000115077;
  kPhCDKN1AByCb = 0.000403404;
  kDpCDKN1A = 0.019999999;
  kAsFOXOPCDKN1B = 0.56824615;
  kDiFOXOPCDKN1B = 0.0015;
  kSyCDKN1B_1 = 2.27379e-5;
  kSyCDKN1B_2 = 0.203819947;
  kDeCDKN1B_1 = 0.000251363;
  kDeCDKN1B_2 = 0.001056432;
  kAsCdkn1bC = 0.004161339;
  kDiCdkn1bC = 6.52055e-5;
  kPhCDKN1BByCe = 0.051862418;
  kPhCDKN1BByCa = 0.0005;
  kPhCDKN1BByCb = 5.04534e-6;
  kDpCDKN1B = 0.014756773;
  _InitialConc1 = 1;
  _InitialConc2 = 0.23224914;
  _InitialConc3 = 0.018479024;
  _InitialConc4 = 3.8081857e-5;
  _InitialConc5 = 0.0070284949;
  _InitialConc6 = 0.0018823629;
  _InitialConc7 = 0.071461332;
  _InitialConc8 = 0.00015053859;
  _InitialConc9 = 0.087642687;
  _InitialConc10 = 0.84074544;
  _InitialConc11 = 0.077191625;
  _InitialConc12 = 4.0287133;
  _InitialConc13 = 0.22995279;
  _InitialConc14 = 0.069890078;
  _InitialConc15 = 0.063091065;
  _InitialConc16 = 0.71354419;
  _InitialConc17 = 0.00057134095;
  _InitialConc18 = 0.16112308;
  _InitialConc19 = 0.10894131;
  _InitialConc20 = 0.00071781614;
  _InitialConc21 = 0.0022125471;
  _InitialConc22 = 0.013607533;
  _InitialConc23 = 1.8804937e-5;
  _InitialConc24 = 0.0055647336;
  _InitialConc25 = 0.00038111617;
  _InitialConc26 = 1.9032592e-7;
  _InitialConc27 = 9.9809674e-5;
  _InitialConc28 = 9.9923815e-5;
  _InitialConc29 = 7.6185347e-8;
  _InitialConc30 = 0.98044163;
  _InitialConc31 = 0.0075129148;
  _InitialConc32 = 0.019558367;
  _InitialConc33 = 0.018438067;
  _InitialConc34 = 0.98156193;
  _InitialConc35 = 0.99752571;
  _InitialConc36 = 0.002474295;
  _InitialConc37 = 0.82686306;
  _InitialConc38 = 0.00032856116;
  _InitialConc39 = 0.17280837;
  _InitialConc40 = 8.4479024e-5;
  _InitialConc41 = 8.4479024e-5;
  _InitialConc42 = 8.4479024e-5;
  _InitialConc43 = 8.4479024e-5;
  _InitialConc44 = 8.4479024e-5;
  _InitialConc45 = 1.5520976e-5;
  _InitialConc46 = 1.5520976e-5;
  _InitialConc47 = 1.5520976e-5;
  _InitialConc48 = 1.5520976e-5;
  _InitialConc49 = 1.5520976e-5;
  _InitialConc50 = 0;
  _InitialConc51 = 0;
  _InitialConc52 = 0;
  _InitialConc53 = 0;
  _InitialConc54 = 0;
  _InitialConc55 = 1;
  _InitialConc56 = 0;
  _InitialConc57 = 0.0001;
  _InitialConc58 = 1;
  _InitialConc59 = 0.0001;
  _rateLaw1 = 0;

  // Assignment rules:
  tCCNE := _cell__CCNE_CDKN1A_B_ + _cell__CCNE_CDKN1A_B_1__CDKN1A_CCNE_A_B_1_Ser130u_ + _cell__CCNE_CDKN1A_B_1__CDKN1B_CCNE_A_1_Thr187u_ + _cell__CCNE_CDKN1A_B_1__CDKN1B_CCNE_A_1_Thr187p_;
  tCCNA := _cell__CCNA_CDKN1A_B_ + _cell__CCNA_CDKN1A_B_1__CDKN1A_CCNE_A_B_1_Ser130u_ + _cell__CCNA_CDKN1A_B_1__CDKN1B_CCNE_A_1_Thr187u_ + _cell__CCNA_CDKN1A_B_1__CDKN1B_CCNE_A_1_Thr187p_;
  tCCNB := _cell__CCNB_CDK1_Thr14_Tyr15u_CDKN1A_ + _cell__CCNB_CDK1_Thr14_Tyr15p_CDKN1A_ + _cell__CCNB_CDK1_Thr14_Tyr15u_CDKN1A_1__CDKN1A_CCNE_A_B_1_Ser130u_ + _cell__CCNB_CDK1_Thr14_Tyr15p_CDKN1A_1__CDKN1A_CCNE_A_B_1_Ser130u_;
  tCDKN1A := _cell__CDKN1A_CCNE_A_B_Ser130u_ + _cell__CCNA_CDKN1A_B_1__CDKN1A_CCNE_A_B_1_Ser130u_ + _cell__CCNE_CDKN1A_B_1__CDKN1A_CCNE_A_B_1_Ser130u_ + _cell__CCNB_CDK1_Thr14_Tyr15u_CDKN1A_1__CDKN1A_CCNE_A_B_1_Ser130u_ + _cell__CCNB_CDK1_Thr14_Tyr15p_CDKN1A_1__CDKN1A_CCNE_A_B_1_Ser130u_ + _cell__CDKN1A_CCNE_A_B_Ser130p_;
  tCDKN1B := _cell__CDKN1B_CCNE_A_Thr187u_ + _cell__CCNA_CDKN1A_B_1__CDKN1B_CCNE_A_1_Thr187u_ + _cell__CCNE_CDKN1A_B_1__CDKN1B_CCNE_A_1_Thr187u_ + _cell__CDKN1B_CCNE_A_Thr187p_ + _cell__CCNA_CDKN1A_B_1__CDKN1B_CCNE_A_1_Thr187p_ + _cell__CCNE_CDKN1A_B_1__CDKN1B_CCNE_A_1_Thr187p_;
  tSKP2 := 0 + _cell__SKP2;
  ApcCdh := _cell__APC_FBXO5_FZR1_CDC20_1_Ser355u__FZR1_APC_1_FBXO5_nTermu_ + _cell__APC_FBXO5_FZR1_CDC20_1_Ser355p__FZR1_APC_1_FBXO5_nTermu_;

  // Reactions:
  R1: => _cell__E2F_DBD_RB1_Ser332u_; kSyE2f1;
  R2: _cell__FOXM1_DBD_Thr600p_ + _cell__CCNB_promoter_FOXM1_ => _cell__CCNB_promoter_FOXM1_1__FOXM1_DBD_1_Thr600p_; kAsFPcb*_cell__FOXM1_DBD_Thr600p_*_cell__CCNB_promoter_FOXM1_;
  R3: _cell__CCNB_promoter_FOXM1_1__FOXM1_DBD_1_Thr600p_ => _cell__FOXM1_DBD_Thr600p_ + _cell__CCNB_promoter_FOXM1_; kDiFPcb*_cell__CCNB_promoter_FOXM1_1__FOXM1_DBD_1_Thr600p_;
  R4: _cell__E2F_DBD_1_RB1_Ser332u__E2F_promoter_E2F_1_ => _cell__E2F_DBD_RB1_Ser332u_ + _cell__E2F_DBD_1_RB1_Ser332u__E2F_promoter_E2F_1_; kSyE2f2*_cell__E2F_DBD_1_RB1_Ser332u__E2F_promoter_E2F_1_;
  R5: _cell__E2F_DBD_1_RB1_Ser332p__E2F_promoter_E2F_1_ => _cell__E2F_DBD_RB1_Ser332u_ + _cell__E2F_DBD_1_RB1_Ser332p__E2F_promoter_E2F_1_; kSyE2f2*_cell__E2F_DBD_1_RB1_Ser332p__E2F_promoter_E2F_1_;
  R6: _cell__E2F_DBD_RB1_Ser332u_ => ; kDeE2f1*_cell__E2F_DBD_RB1_Ser332u_;
  R7: _cell__E2F_DBD_RB1_Ser332p_ => ; kDeE2f1*_cell__E2F_DBD_RB1_Ser332p_;
  R8: _cell__E2F_DBD_RB1_1_Ser332u__RB1_E2F_1_Ser807_Ser811u_ => _cell__RB1_E2F_Ser807_Ser811u_; kDeE2f1*_cell__E2F_DBD_RB1_1_Ser332u__RB1_E2F_1_Ser807_Ser811u_;
  R9: _cell__E2F_DBD_RB1_1_Ser332p__RB1_E2F_1_Ser807_Ser811u_ => _cell__RB1_E2F_Ser807_Ser811u_; kDeE2f1*_cell__E2F_DBD_RB1_1_Ser332p__RB1_E2F_1_Ser807_Ser811u_;
  R10: _cell__CCNE_promoter_E2F_1__E2F_DBD_1_RB1_Ser332u_ => _cell__CCNE_promoter_E2F_; kDeE2f1*_cell__CCNE_promoter_E2F_1__E2F_DBD_1_RB1_Ser332u_;
  R11: _cell__CCNA_promoter_E2F_1__E2F_DBD_1_RB1_Ser332u_ => _cell__CCNA_promoter_E2F_; kDeE2f1*_cell__CCNA_promoter_E2F_1__E2F_DBD_1_RB1_Ser332u_;
  R12: _cell__E2F_DBD_1_RB1_Ser332u__E2F_promoter_E2F_1_ => _cell__E2F_promoter_E2F_; kDeE2f1*_cell__E2F_DBD_1_RB1_Ser332u__E2F_promoter_E2F_1_;
  R13: _cell__E2F_DBD_1_RB1_Ser332u__FBXO5_promoter_E2F_1_ => _cell__FBXO5_promoter_E2F_; kDeE2f1*_cell__E2F_DBD_1_RB1_Ser332u__FBXO5_promoter_E2F_1_;
  R14: _cell__E2F_DBD_1_RB1_Ser332u__FOXM1_promoter_E2F_1_ => _cell__FOXM1_promoter_E2F_; kDeE2f1*_cell__E2F_DBD_1_RB1_Ser332u__FOXM1_promoter_E2F_1_;
  R15: _cell__CCNE_promoter_E2F_1__E2F_DBD_1_RB1_Ser332p_ => _cell__CCNE_promoter_E2F_; kDeE2f1*_cell__CCNE_promoter_E2F_1__E2F_DBD_1_RB1_Ser332p_;
  R16: _cell__CCNA_promoter_E2F_1__E2F_DBD_1_RB1_Ser332p_ => _cell__CCNA_promoter_E2F_; kDeE2f1*_cell__CCNA_promoter_E2F_1__E2F_DBD_1_RB1_Ser332p_;
  R17: _cell__E2F_DBD_1_RB1_Ser332p__E2F_promoter_E2F_1_ => _cell__E2F_promoter_E2F_; kDeE2f1*_cell__E2F_DBD_1_RB1_Ser332p__E2F_promoter_E2F_1_;
  R18: _cell__E2F_DBD_1_RB1_Ser332p__FBXO5_promoter_E2F_1_ => _cell__FBXO5_promoter_E2F_; kDeE2f1*_cell__E2F_DBD_1_RB1_Ser332p__FBXO5_promoter_E2F_1_;
  R19: _cell__E2F_DBD_1_RB1_Ser332p__FOXM1_promoter_E2F_1_ => _cell__FOXM1_promoter_E2F_; kDeE2f1*_cell__E2F_DBD_1_RB1_Ser332p__FOXM1_promoter_E2F_1_;
  R20: _cell__CCND + _cell__E2F_DBD_RB1_1_Ser332u__RB1_E2F_1_Ser807_Ser811u_ => _cell__CCND + _cell__E2F_DBD_RB1_Ser332u_ + _cell__RB1_E2F_Ser807_Ser811p_; kPhRbD*_cell__CCND*_cell__E2F_DBD_RB1_1_Ser332u__RB1_E2F_1_Ser807_Ser811u_;
  R21: _cell__CCND + _cell__E2F_DBD_RB1_1_Ser332p__RB1_E2F_1_Ser807_Ser811u_ => _cell__CCND + _cell__E2F_DBD_RB1_Ser332p_ + _cell__RB1_E2F_Ser807_Ser811p_; kPhRbD*_cell__CCND*_cell__E2F_DBD_RB1_1_Ser332p__RB1_E2F_1_Ser807_Ser811u_;
  R22: _cell__CCNE_CDKN1A_B_ + _cell__E2F_DBD_RB1_1_Ser332u__RB1_E2F_1_Ser807_Ser811u_ => _cell__CCNE_CDKN1A_B_ + _cell__E2F_DBD_RB1_Ser332u_ + _cell__RB1_E2F_Ser807_Ser811p_; kPhRbE*_cell__CCNE_CDKN1A_B_*_cell__E2F_DBD_RB1_1_Ser332u__RB1_E2F_1_Ser807_Ser811u_;
  R23: _cell__CCNE_CDKN1A_B_ + _cell__E2F_DBD_RB1_1_Ser332p__RB1_E2F_1_Ser807_Ser811u_ => _cell__CCNE_CDKN1A_B_ + _cell__E2F_DBD_RB1_Ser332p_ + _cell__RB1_E2F_Ser807_Ser811p_; kPhRbE*_cell__CCNE_CDKN1A_B_*_cell__E2F_DBD_RB1_1_Ser332p__RB1_E2F_1_Ser807_Ser811u_;
  R24: _cell__CCNA_CDKN1A_B_ + _cell__E2F_DBD_RB1_1_Ser332u__RB1_E2F_1_Ser807_Ser811u_ => _cell__E2F_DBD_RB1_Ser332u_ + _cell__CCNA_CDKN1A_B_ + _cell__RB1_E2F_Ser807_Ser811p_; kPhRb*_cell__CCNA_CDKN1A_B_*_cell__E2F_DBD_RB1_1_Ser332u__RB1_E2F_1_Ser807_Ser811u_;
  R25: _cell__CCNA_CDKN1A_B_ + _cell__E2F_DBD_RB1_1_Ser332p__RB1_E2F_1_Ser807_Ser811u_ => _cell__E2F_DBD_RB1_Ser332p_ + _cell__CCNA_CDKN1A_B_ + _cell__RB1_E2F_Ser807_Ser811p_; kPhRb*_cell__CCNA_CDKN1A_B_*_cell__E2F_DBD_RB1_1_Ser332p__RB1_E2F_1_Ser807_Ser811u_;
  R26: _cell__CCNB_CDK1_Thr14_Tyr15u_CDKN1A_ + _cell__E2F_DBD_RB1_1_Ser332u__RB1_E2F_1_Ser807_Ser811u_ => _cell__E2F_DBD_RB1_Ser332u_ + _cell__CCNB_CDK1_Thr14_Tyr15u_CDKN1A_ + _cell__RB1_E2F_Ser807_Ser811p_; kPhRb*_cell__CCNB_CDK1_Thr14_Tyr15u_CDKN1A_*_cell__E2F_DBD_RB1_1_Ser332u__RB1_E2F_1_Ser807_Ser811u_;
  R27: _cell__CCNB_CDK1_Thr14_Tyr15u_CDKN1A_ + _cell__E2F_DBD_RB1_1_Ser332p__RB1_E2F_1_Ser807_Ser811u_ => _cell__E2F_DBD_RB1_Ser332p_ + _cell__CCNB_CDK1_Thr14_Tyr15u_CDKN1A_ + _cell__RB1_E2F_Ser807_Ser811p_; kPhRb*_cell__CCNB_CDK1_Thr14_Tyr15u_CDKN1A_*_cell__E2F_DBD_RB1_1_Ser332p__RB1_E2F_1_Ser807_Ser811u_;
  R28: _cell__E2F_DBD_RB1_Ser332u_ + _cell__CCNA_CDKN1A_B_ => _cell__E2F_DBD_RB1_Ser332p_ + _cell__CCNA_CDKN1A_B_; kPhE2f*_cell__E2F_DBD_RB1_Ser332u_*_cell__CCNA_CDKN1A_B_;
  R29: _cell__CCNA_CDKN1A_B_ + _cell__E2F_DBD_RB1_1_Ser332u__RB1_E2F_1_Ser807_Ser811u_ => _cell__CCNA_CDKN1A_B_ + _cell__E2F_DBD_RB1_1_Ser332p__RB1_E2F_1_Ser807_Ser811u_; kPhE2f*_cell__CCNA_CDKN1A_B_*_cell__E2F_DBD_RB1_1_Ser332u__RB1_E2F_1_Ser807_Ser811u_;
  R30: _cell__CCNA_CDKN1A_B_ + _cell__CCNE_promoter_E2F_1__E2F_DBD_1_RB1_Ser332u_ => _cell__CCNA_CDKN1A_B_ + _cell__CCNE_promoter_E2F_1__E2F_DBD_1_RB1_Ser332p_; kPhE2f*_cell__CCNA_CDKN1A_B_*_cell__CCNE_promoter_E2F_1__E2F_DBD_1_RB1_Ser332u_;
  R31: _cell__CCNA_CDKN1A_B_ + _cell__CCNA_promoter_E2F_1__E2F_DBD_1_RB1_Ser332u_ => _cell__CCNA_CDKN1A_B_ + _cell__CCNA_promoter_E2F_1__E2F_DBD_1_RB1_Ser332p_; kPhE2f*_cell__CCNA_CDKN1A_B_*_cell__CCNA_promoter_E2F_1__E2F_DBD_1_RB1_Ser332u_;
  R32: _cell__CCNA_CDKN1A_B_ + _cell__E2F_DBD_1_RB1_Ser332u__E2F_promoter_E2F_1_ => _cell__CCNA_CDKN1A_B_ + _cell__E2F_DBD_1_RB1_Ser332p__E2F_promoter_E2F_1_; kPhE2f*_cell__CCNA_CDKN1A_B_*_cell__E2F_DBD_1_RB1_Ser332u__E2F_promoter_E2F_1_;
  R33: _cell__CCNA_CDKN1A_B_ + _cell__E2F_DBD_1_RB1_Ser332u__FBXO5_promoter_E2F_1_ => _cell__CCNA_CDKN1A_B_ + _cell__E2F_DBD_1_RB1_Ser332p__FBXO5_promoter_E2F_1_; kPhE2f*_cell__CCNA_CDKN1A_B_*_cell__E2F_DBD_1_RB1_Ser332u__FBXO5_promoter_E2F_1_;
  R34: _cell__CCNA_CDKN1A_B_ + _cell__E2F_DBD_1_RB1_Ser332u__FOXM1_promoter_E2F_1_ => _cell__CCNA_CDKN1A_B_ + _cell__E2F_DBD_1_RB1_Ser332p__FOXM1_promoter_E2F_1_; kPhE2f*_cell__CCNA_CDKN1A_B_*_cell__E2F_DBD_1_RB1_Ser332u__FOXM1_promoter_E2F_1_;
  R35: _cell__E2F_DBD_RB1_Ser332u_ + _cell__CCNB_CDK1_Thr14_Tyr15u_CDKN1A_ => _cell__E2F_DBD_RB1_Ser332p_ + _cell__CCNB_CDK1_Thr14_Tyr15u_CDKN1A_; kPhE2f*_cell__E2F_DBD_RB1_Ser332u_*_cell__CCNB_CDK1_Thr14_Tyr15u_CDKN1A_;
  R36: _cell__CCNB_CDK1_Thr14_Tyr15u_CDKN1A_ + _cell__E2F_DBD_RB1_1_Ser332u__RB1_E2F_1_Ser807_Ser811u_ => _cell__CCNB_CDK1_Thr14_Tyr15u_CDKN1A_ + _cell__E2F_DBD_RB1_1_Ser332p__RB1_E2F_1_Ser807_Ser811u_; kPhE2f*_cell__CCNB_CDK1_Thr14_Tyr15u_CDKN1A_*_cell__E2F_DBD_RB1_1_Ser332u__RB1_E2F_1_Ser807_Ser811u_;
  R37: _cell__CCNB_CDK1_Thr14_Tyr15u_CDKN1A_ + _cell__CCNE_promoter_E2F_1__E2F_DBD_1_RB1_Ser332u_ => _cell__CCNB_CDK1_Thr14_Tyr15u_CDKN1A_ + _cell__CCNE_promoter_E2F_1__E2F_DBD_1_RB1_Ser332p_; kPhE2f*_cell__CCNB_CDK1_Thr14_Tyr15u_CDKN1A_*_cell__CCNE_promoter_E2F_1__E2F_DBD_1_RB1_Ser332u_;
  R38: _cell__CCNB_CDK1_Thr14_Tyr15u_CDKN1A_ + _cell__CCNA_promoter_E2F_1__E2F_DBD_1_RB1_Ser332u_ => _cell__CCNB_CDK1_Thr14_Tyr15u_CDKN1A_ + _cell__CCNA_promoter_E2F_1__E2F_DBD_1_RB1_Ser332p_; kPhE2f*_cell__CCNB_CDK1_Thr14_Tyr15u_CDKN1A_*_cell__CCNA_promoter_E2F_1__E2F_DBD_1_RB1_Ser332u_;
  R39: _cell__CCNB_CDK1_Thr14_Tyr15u_CDKN1A_ + _cell__E2F_DBD_1_RB1_Ser332u__E2F_promoter_E2F_1_ => _cell__CCNB_CDK1_Thr14_Tyr15u_CDKN1A_ + _cell__E2F_DBD_1_RB1_Ser332p__E2F_promoter_E2F_1_; kPhE2f*_cell__CCNB_CDK1_Thr14_Tyr15u_CDKN1A_*_cell__E2F_DBD_1_RB1_Ser332u__E2F_promoter_E2F_1_;
  R40: _cell__CCNB_CDK1_Thr14_Tyr15u_CDKN1A_ + _cell__E2F_DBD_1_RB1_Ser332u__FBXO5_promoter_E2F_1_ => _cell__CCNB_CDK1_Thr14_Tyr15u_CDKN1A_ + _cell__E2F_DBD_1_RB1_Ser332p__FBXO5_promoter_E2F_1_; kPhE2f*_cell__CCNB_CDK1_Thr14_Tyr15u_CDKN1A_*_cell__E2F_DBD_1_RB1_Ser332u__FBXO5_promoter_E2F_1_;
  R41: _cell__CCNB_CDK1_Thr14_Tyr15u_CDKN1A_ + _cell__E2F_DBD_1_RB1_Ser332u__FOXM1_promoter_E2F_1_ => _cell__CCNB_CDK1_Thr14_Tyr15u_CDKN1A_ + _cell__E2F_DBD_1_RB1_Ser332p__FOXM1_promoter_E2F_1_; kPhE2f*_cell__CCNB_CDK1_Thr14_Tyr15u_CDKN1A_*_cell__E2F_DBD_1_RB1_Ser332u__FOXM1_promoter_E2F_1_;
  R42: _cell__E2F_DBD_RB1_Ser332p_ => _cell__E2F_DBD_RB1_Ser332u_; kDpE2f1*_cell__E2F_DBD_RB1_Ser332p_;
  R43: _cell__E2F_DBD_RB1_1_Ser332p__RB1_E2F_1_Ser807_Ser811u_ => _cell__E2F_DBD_RB1_1_Ser332u__RB1_E2F_1_Ser807_Ser811u_; kDpE2f1*_cell__E2F_DBD_RB1_1_Ser332p__RB1_E2F_1_Ser807_Ser811u_;
  R44: _cell__CCNE_promoter_E2F_1__E2F_DBD_1_RB1_Ser332p_ => _cell__CCNE_promoter_E2F_1__E2F_DBD_1_RB1_Ser332u_; kDpE2f1*_cell__CCNE_promoter_E2F_1__E2F_DBD_1_RB1_Ser332p_;
  R45: _cell__CCNA_promoter_E2F_1__E2F_DBD_1_RB1_Ser332p_ => _cell__CCNA_promoter_E2F_1__E2F_DBD_1_RB1_Ser332u_; kDpE2f1*_cell__CCNA_promoter_E2F_1__E2F_DBD_1_RB1_Ser332p_;
  R46: _cell__E2F_DBD_1_RB1_Ser332p__E2F_promoter_E2F_1_ => _cell__E2F_DBD_1_RB1_Ser332u__E2F_promoter_E2F_1_; kDpE2f1*_cell__E2F_DBD_1_RB1_Ser332p__E2F_promoter_E2F_1_;
  R47: _cell__E2F_DBD_1_RB1_Ser332p__FBXO5_promoter_E2F_1_ => _cell__E2F_DBD_1_RB1_Ser332u__FBXO5_promoter_E2F_1_; kDpE2f1*_cell__E2F_DBD_1_RB1_Ser332p__FBXO5_promoter_E2F_1_;
  R48: _cell__E2F_DBD_1_RB1_Ser332p__FOXM1_promoter_E2F_1_ => _cell__E2F_DBD_1_RB1_Ser332u__FOXM1_promoter_E2F_1_; kDpE2f1*_cell__E2F_DBD_1_RB1_Ser332p__FOXM1_promoter_E2F_1_;
  R49: _cell__E2F_DBD_RB1_Ser332p_ + _cell__PPP2R2B_ENSA_ARPP19_ => _cell__E2F_DBD_RB1_Ser332u_ + _cell__PPP2R2B_ENSA_ARPP19_; kDpE2f2*_cell__E2F_DBD_RB1_Ser332p_*_cell__PPP2R2B_ENSA_ARPP19_;
  R50: _cell__E2F_DBD_RB1_1_Ser332p__RB1_E2F_1_Ser807_Ser811u_ + _cell__PPP2R2B_ENSA_ARPP19_ => _cell__E2F_DBD_RB1_1_Ser332u__RB1_E2F_1_Ser807_Ser811u_ + _cell__PPP2R2B_ENSA_ARPP19_; kDpE2f2*_cell__E2F_DBD_RB1_1_Ser332p__RB1_E2F_1_Ser807_Ser811u_*_cell__PPP2R2B_ENSA_ARPP19_;
  R51: _cell__PPP2R2B_ENSA_ARPP19_ + _cell__CCNE_promoter_E2F_1__E2F_DBD_1_RB1_Ser332p_ => _cell__PPP2R2B_ENSA_ARPP19_ + _cell__CCNE_promoter_E2F_1__E2F_DBD_1_RB1_Ser332u_; kDpE2f2*_cell__PPP2R2B_ENSA_ARPP19_*_cell__CCNE_promoter_E2F_1__E2F_DBD_1_RB1_Ser332p_;
  R52: _cell__PPP2R2B_ENSA_ARPP19_ + _cell__CCNA_promoter_E2F_1__E2F_DBD_1_RB1_Ser332p_ => _cell__PPP2R2B_ENSA_ARPP19_ + _cell__CCNA_promoter_E2F_1__E2F_DBD_1_RB1_Ser332u_; kDpE2f2*_cell__PPP2R2B_ENSA_ARPP19_*_cell__CCNA_promoter_E2F_1__E2F_DBD_1_RB1_Ser332p_;
  R53: _cell__PPP2R2B_ENSA_ARPP19_ + _cell__E2F_DBD_1_RB1_Ser332p__E2F_promoter_E2F_1_ => _cell__PPP2R2B_ENSA_ARPP19_ + _cell__E2F_DBD_1_RB1_Ser332u__E2F_promoter_E2F_1_; kDpE2f2*_cell__PPP2R2B_ENSA_ARPP19_*_cell__E2F_DBD_1_RB1_Ser332p__E2F_promoter_E2F_1_;
  R54: _cell__PPP2R2B_ENSA_ARPP19_ + _cell__E2F_DBD_1_RB1_Ser332p__FBXO5_promoter_E2F_1_ => _cell__PPP2R2B_ENSA_ARPP19_ + _cell__E2F_DBD_1_RB1_Ser332u__FBXO5_promoter_E2F_1_; kDpE2f2*_cell__PPP2R2B_ENSA_ARPP19_*_cell__E2F_DBD_1_RB1_Ser332p__FBXO5_promoter_E2F_1_;
  R55: _cell__PPP2R2B_ENSA_ARPP19_ + _cell__E2F_DBD_1_RB1_Ser332p__FOXM1_promoter_E2F_1_ => _cell__PPP2R2B_ENSA_ARPP19_ + _cell__E2F_DBD_1_RB1_Ser332u__FOXM1_promoter_E2F_1_; kDpE2f2*_cell__PPP2R2B_ENSA_ARPP19_*_cell__E2F_DBD_1_RB1_Ser332p__FOXM1_promoter_E2F_1_;
  R56: _cell__E2F_DBD_RB1_Ser332p_ + _cell__SKP2 => _cell__SKP2; kDeE2f2*_cell__E2F_DBD_RB1_Ser332p_*_cell__SKP2;
  R57: _cell__E2F_DBD_RB1_1_Ser332p__RB1_E2F_1_Ser807_Ser811u_ + _cell__SKP2 => _cell__RB1_E2F_Ser807_Ser811u_ + _cell__SKP2; kDeE2f2*_cell__E2F_DBD_RB1_1_Ser332p__RB1_E2F_1_Ser807_Ser811u_*_cell__SKP2;
  R58: _cell__CCNE_promoter_E2F_1__E2F_DBD_1_RB1_Ser332p_ + _cell__SKP2 => _cell__CCNE_promoter_E2F_ + _cell__SKP2; kDeE2f2*_cell__CCNE_promoter_E2F_1__E2F_DBD_1_RB1_Ser332p_*_cell__SKP2;
  R59: _cell__CCNA_promoter_E2F_1__E2F_DBD_1_RB1_Ser332p_ + _cell__SKP2 => _cell__CCNA_promoter_E2F_ + _cell__SKP2; kDeE2f2*_cell__CCNA_promoter_E2F_1__E2F_DBD_1_RB1_Ser332p_*_cell__SKP2;
  R60: _cell__E2F_DBD_1_RB1_Ser332p__E2F_promoter_E2F_1_ + _cell__SKP2 => _cell__E2F_promoter_E2F_ + _cell__SKP2; kDeE2f2*_cell__E2F_DBD_1_RB1_Ser332p__E2F_promoter_E2F_1_*_cell__SKP2;
  R61: _cell__E2F_DBD_1_RB1_Ser332p__FBXO5_promoter_E2F_1_ + _cell__SKP2 => _cell__FBXO5_promoter_E2F_ + _cell__SKP2; kDeE2f2*_cell__E2F_DBD_1_RB1_Ser332p__FBXO5_promoter_E2F_1_*_cell__SKP2;
  R62: _cell__E2F_DBD_1_RB1_Ser332p__FOXM1_promoter_E2F_1_ + _cell__SKP2 => _cell__FOXM1_promoter_E2F_ + _cell__SKP2; kDeE2f2*_cell__E2F_DBD_1_RB1_Ser332p__FOXM1_promoter_E2F_1_*_cell__SKP2;
  R63: _cell__CCND + _cell__RB1_E2F_Ser807_Ser811u_ => _cell__CCND + _cell__RB1_E2F_Ser807_Ser811p_; kPhRbD*_cell__CCND*_cell__RB1_E2F_Ser807_Ser811u_;
  R64: _cell__CCNE_CDKN1A_B_ + _cell__RB1_E2F_Ser807_Ser811u_ => _cell__CCNE_CDKN1A_B_ + _cell__RB1_E2F_Ser807_Ser811p_; kPhRbE*_cell__CCNE_CDKN1A_B_*_cell__RB1_E2F_Ser807_Ser811u_;
  R65: _cell__CCNA_CDKN1A_B_ + _cell__RB1_E2F_Ser807_Ser811u_ => _cell__CCNA_CDKN1A_B_ + _cell__RB1_E2F_Ser807_Ser811p_; kPhRb*_cell__CCNA_CDKN1A_B_*_cell__RB1_E2F_Ser807_Ser811u_;
  R66: _cell__CCNB_CDK1_Thr14_Tyr15u_CDKN1A_ + _cell__RB1_E2F_Ser807_Ser811u_ => _cell__CCNB_CDK1_Thr14_Tyr15u_CDKN1A_ + _cell__RB1_E2F_Ser807_Ser811p_; kPhRb*_cell__CCNB_CDK1_Thr14_Tyr15u_CDKN1A_*_cell__RB1_E2F_Ser807_Ser811u_;
  R67: => _cell__CCNE_CDKN1A_B_; kSyCe1;
  R68: _cell__CCNA_promoter_E2F_1__E2F_DBD_1_RB1_Ser332u_ => _cell__CCNA_CDKN1A_B_ + _cell__CCNA_promoter_E2F_1__E2F_DBD_1_RB1_Ser332u_; kSyCa2*_cell__CCNA_promoter_E2F_1__E2F_DBD_1_RB1_Ser332u_;
  R69: _cell__CCNA_promoter_E2F_1__E2F_DBD_1_RB1_Ser332p_ => _cell__CCNA_CDKN1A_B_ + _cell__CCNA_promoter_E2F_1__E2F_DBD_1_RB1_Ser332p_; kSyCa2*_cell__CCNA_promoter_E2F_1__E2F_DBD_1_RB1_Ser332p_;
  R70: _cell__CCNE_CDKN1A_B_ => ; kDeCe*_cell__CCNE_CDKN1A_B_;
  R71: _cell__CCNE_CDKN1A_B_ + _cell__CCNE_CDKN1A_B_ => _cell__CCNE_CDKN1A_B_; kPhCeE*_cell__CCNE_CDKN1A_B_*_cell__CCNE_CDKN1A_B_;
  R72: _cell__RB1_E2F_Ser807_Ser811p_ => _cell__RB1_E2F_Ser807_Ser811u_; kDpRb*_cell__RB1_E2F_Ser807_Ser811p_;
  R73: _cell__APC_FBXO5_FZR1_CDC20_1_Ser355p__CDC20_APC_1_ => _cell__APC_FBXO5_FZR1_CDC20_Ser355u_ + _cell__CDC20_APC_; kDpApc_1*_cell__APC_FBXO5_FZR1_CDC20_1_Ser355p__CDC20_APC_1_;
  R74: _cell__PPP2R2B_ENSA_ARPP19_ + _cell__APC_FBXO5_FZR1_CDC20_1_Ser355p__CDC20_APC_1_ => _cell__PPP2R2B_ENSA_ARPP19_ + _cell__APC_FBXO5_FZR1_CDC20_Ser355u_ + _cell__CDC20_APC_; kDpApc_2*_cell__PPP2R2B_ENSA_ARPP19_*_cell__APC_FBXO5_FZR1_CDC20_1_Ser355p__CDC20_APC_1_;
  R75: _cell__CCNA_CDKN1A_B_ + _cell__APC_FBXO5_FZR1_CDC20_Ser355u_ => _cell__CCNA_CDKN1A_B_ + _cell__APC_FBXO5_FZR1_CDC20_Ser355p_; kPhApcA*_cell__CCNA_CDKN1A_B_*_cell__APC_FBXO5_FZR1_CDC20_Ser355u_;
  R76: _cell__CCNA_CDKN1A_B_ + _cell__APC_FBXO5_FZR1_CDC20_1_Ser355u__FZR1_APC_1_FBXO5_nTermu_ => _cell__CCNA_CDKN1A_B_ + _cell__APC_FBXO5_FZR1_CDC20_1_Ser355p__FZR1_APC_1_FBXO5_nTermu_; kPhApcA*_cell__CCNA_CDKN1A_B_*_cell__APC_FBXO5_FZR1_CDC20_1_Ser355u__FZR1_APC_1_FBXO5_nTermu_;
  R77: _cell__CCNA_CDKN1A_B_ + _cell__APC_FBXO5_1_FZR1_CDC20_2_Ser355u__FBXO5_APC_1_FZR1_3_Ser182u__FZR1_APC_2_FBXO5_3_nTermu_ => _cell__CCNA_CDKN1A_B_ + _cell__APC_FBXO5_1_FZR1_CDC20_2_Ser355p__FBXO5_APC_1_FZR1_3_Ser182u__FZR1_APC_2_FBXO5_3_nTermu_; kPhApcA*_cell__CCNA_CDKN1A_B_*_cell__APC_FBXO5_1_FZR1_CDC20_2_Ser355u__FBXO5_APC_1_FZR1_3_Ser182u__FZR1_APC_2_FBXO5_3_nTermu_;
  R78: _cell__CCNB_CDK1_Thr14_Tyr15u_CDKN1A_ + _cell__APC_FBXO5_FZR1_CDC20_Ser355u_ => _cell__CCNB_CDK1_Thr14_Tyr15u_CDKN1A_ + _cell__APC_FBXO5_FZR1_CDC20_Ser355p_; kPhApcA*_cell__CCNB_CDK1_Thr14_Tyr15u_CDKN1A_*_cell__APC_FBXO5_FZR1_CDC20_Ser355u_;
  R79: _cell__CCNB_CDK1_Thr14_Tyr15u_CDKN1A_ + _cell__APC_FBXO5_FZR1_CDC20_1_Ser355u__FZR1_APC_1_FBXO5_nTermu_ => _cell__CCNB_CDK1_Thr14_Tyr15u_CDKN1A_ + _cell__APC_FBXO5_FZR1_CDC20_1_Ser355p__FZR1_APC_1_FBXO5_nTermu_; kPhApcA*_cell__CCNB_CDK1_Thr14_Tyr15u_CDKN1A_*_cell__APC_FBXO5_FZR1_CDC20_1_Ser355u__FZR1_APC_1_FBXO5_nTermu_;
  R80: _cell__CCNB_CDK1_Thr14_Tyr15u_CDKN1A_ + _cell__APC_FBXO5_1_FZR1_CDC20_2_Ser355u__FBXO5_APC_1_FZR1_3_Ser182u__FZR1_APC_2_FBXO5_3_nTermu_ => _cell__CCNB_CDK1_Thr14_Tyr15u_CDKN1A_ + _cell__APC_FBXO5_1_FZR1_CDC20_2_Ser355p__FBXO5_APC_1_FZR1_3_Ser182u__FZR1_APC_2_FBXO5_3_nTermu_; kPhApcA*_cell__CCNB_CDK1_Thr14_Tyr15u_CDKN1A_*_cell__APC_FBXO5_1_FZR1_CDC20_2_Ser355u__FBXO5_APC_1_FZR1_3_Ser182u__FZR1_APC_2_FBXO5_3_nTermu_;
  R81: _cell__APC_FBXO5_FZR1_CDC20_Ser355p_ => _cell__APC_FBXO5_FZR1_CDC20_Ser355u_; kDpApc_1*_cell__APC_FBXO5_FZR1_CDC20_Ser355p_;
  R82: _cell__APC_FBXO5_1_FZR1_CDC20_2_Ser355p__FBXO5_APC_1_FZR1_3_Ser182u__FZR1_APC_2_FBXO5_3_nTermu_ => _cell__APC_FBXO5_1_FZR1_CDC20_2_Ser355u__FBXO5_APC_1_FZR1_3_Ser182u__FZR1_APC_2_FBXO5_3_nTermu_; kDpApc_1*_cell__APC_FBXO5_1_FZR1_CDC20_2_Ser355p__FBXO5_APC_1_FZR1_3_Ser182u__FZR1_APC_2_FBXO5_3_nTermu_;
  R83: _cell__APC_FBXO5_FZR1_CDC20_1_Ser355p__FZR1_APC_1_FBXO5_nTermu_ => _cell__APC_FBXO5_FZR1_CDC20_1_Ser355u__FZR1_APC_1_FBXO5_nTermu_; kDpApc_1*_cell__APC_FBXO5_FZR1_CDC20_1_Ser355p__FZR1_APC_1_FBXO5_nTermu_;
  R84: _cell__PPP2R2B_ENSA_ARPP19_ + _cell__APC_FBXO5_FZR1_CDC20_Ser355p_ => _cell__PPP2R2B_ENSA_ARPP19_ + _cell__APC_FBXO5_FZR1_CDC20_Ser355u_; kDpApc_2*_cell__PPP2R2B_ENSA_ARPP19_*_cell__APC_FBXO5_FZR1_CDC20_Ser355p_;
  R85: _cell__PPP2R2B_ENSA_ARPP19_ + _cell__APC_FBXO5_1_FZR1_CDC20_2_Ser355p__FBXO5_APC_1_FZR1_3_Ser182u__FZR1_APC_2_FBXO5_3_nTermu_ => _cell__PPP2R2B_ENSA_ARPP19_ + _cell__APC_FBXO5_1_FZR1_CDC20_2_Ser355u__FBXO5_APC_1_FZR1_3_Ser182u__FZR1_APC_2_FBXO5_3_nTermu_; kDpApc_2*_cell__PPP2R2B_ENSA_ARPP19_*_cell__APC_FBXO5_1_FZR1_CDC20_2_Ser355p__FBXO5_APC_1_FZR1_3_Ser182u__FZR1_APC_2_FBXO5_3_nTermu_;
  R86: _cell__PPP2R2B_ENSA_ARPP19_ + _cell__APC_FBXO5_FZR1_CDC20_1_Ser355p__FZR1_APC_1_FBXO5_nTermu_ => _cell__PPP2R2B_ENSA_ARPP19_ + _cell__APC_FBXO5_FZR1_CDC20_1_Ser355u__FZR1_APC_1_FBXO5_nTermu_; kDpApc_2*_cell__PPP2R2B_ENSA_ARPP19_*_cell__APC_FBXO5_FZR1_CDC20_1_Ser355p__FZR1_APC_1_FBXO5_nTermu_;
  R87: _cell__CCNA_CDKN1A_B_ + _cell__APC_FBXO5_FZR1_CDC20_1_Ser355u__FZR1_APC_1_FBXO5_nTermu_ => _cell__CCNA_CDKN1A_B_ + _cell__APC_FBXO5_FZR1_CDC20_Ser355u_ + _cell__FZR1_APC_FBXO5_nTermp_; kPhCdhA*_cell__CCNA_CDKN1A_B_*_cell__APC_FBXO5_FZR1_CDC20_1_Ser355u__FZR1_APC_1_FBXO5_nTermu_;
  R88: _cell__CCNA_CDKN1A_B_ + _cell__APC_FBXO5_FZR1_CDC20_1_Ser355p__FZR1_APC_1_FBXO5_nTermu_ => _cell__CCNA_CDKN1A_B_ + _cell__APC_FBXO5_FZR1_CDC20_Ser355p_ + _cell__FZR1_APC_FBXO5_nTermp_; kPhCdhA*_cell__CCNA_CDKN1A_B_*_cell__APC_FBXO5_FZR1_CDC20_1_Ser355p__FZR1_APC_1_FBXO5_nTermu_;
  R89: _cell__CCNE_CDKN1A_B_ + _cell__APC_FBXO5_1_FZR1_CDC20_2_Ser355u__FBXO5_APC_1_FZR1_3_Ser182u__FZR1_APC_2_FBXO5_3_nTermu_ => _cell__CCNE_CDKN1A_B_ + _cell__APC_FBXO5_FZR1_CDC20_Ser355u_ + _cell__FZR1_APC_FBXO5_nTermp_ + _cell__FBXO5_APC_FZR1_Ser182u_; kPhCAEE*_cell__CCNE_CDKN1A_B_*_cell__APC_FBXO5_1_FZR1_CDC20_2_Ser355u__FBXO5_APC_1_FZR1_3_Ser182u__FZR1_APC_2_FBXO5_3_nTermu_;
  R90: _cell__CCNE_CDKN1A_B_ + _cell__APC_FBXO5_1_FZR1_CDC20_2_Ser355p__FBXO5_APC_1_FZR1_3_Ser182u__FZR1_APC_2_FBXO5_3_nTermu_ => _cell__CCNE_CDKN1A_B_ + _cell__APC_FBXO5_FZR1_CDC20_Ser355p_ + _cell__FZR1_APC_FBXO5_nTermp_ + _cell__FBXO5_APC_FZR1_Ser182u_; kPhCAEE*_cell__CCNE_CDKN1A_B_*_cell__APC_FBXO5_1_FZR1_CDC20_2_Ser355p__FBXO5_APC_1_FZR1_3_Ser182u__FZR1_APC_2_FBXO5_3_nTermu_;
  R91: _cell__CCNA_CDKN1A_B_ + _cell__APC_FBXO5_1_FZR1_CDC20_2_Ser355u__FBXO5_APC_1_FZR1_3_Ser182u__FZR1_APC_2_FBXO5_3_nTermu_ => _cell__CCNA_CDKN1A_B_ + _cell__APC_FBXO5_FZR1_CDC20_Ser355u_ + _cell__FZR1_APC_FBXO5_nTermp_ + _cell__FBXO5_APC_FZR1_Ser182u_; kPhCAEA*_cell__CCNA_CDKN1A_B_*_cell__APC_FBXO5_1_FZR1_CDC20_2_Ser355u__FBXO5_APC_1_FZR1_3_Ser182u__FZR1_APC_2_FBXO5_3_nTermu_;
  R92: _cell__CCNA_CDKN1A_B_ + _cell__APC_FBXO5_1_FZR1_CDC20_2_Ser355p__FBXO5_APC_1_FZR1_3_Ser182u__FZR1_APC_2_FBXO5_3_nTermu_ => _cell__CCNA_CDKN1A_B_ + _cell__APC_FBXO5_FZR1_CDC20_Ser355p_ + _cell__FZR1_APC_FBXO5_nTermp_ + _cell__FBXO5_APC_FZR1_Ser182u_; kPhCAEA*_cell__CCNA_CDKN1A_B_*_cell__APC_FBXO5_1_FZR1_CDC20_2_Ser355p__FBXO5_APC_1_FZR1_3_Ser182u__FZR1_APC_2_FBXO5_3_nTermu_;
  R93: _cell__CCNB_CDK1_Thr14_Tyr15u_CDKN1A_ + _cell__APC_FBXO5_1_FZR1_CDC20_2_Ser355u__FBXO5_APC_1_FZR1_3_Ser182u__FZR1_APC_2_FBXO5_3_nTermu_ => _cell__CCNB_CDK1_Thr14_Tyr15u_CDKN1A_ + _cell__APC_FBXO5_FZR1_CDC20_Ser355u_ + _cell__FZR1_APC_FBXO5_nTermp_ + _cell__FBXO5_APC_FZR1_Ser182u_; kPhCAEB*_cell__CCNB_CDK1_Thr14_Tyr15u_CDKN1A_*_cell__APC_FBXO5_1_FZR1_CDC20_2_Ser355u__FBXO5_APC_1_FZR1_3_Ser182u__FZR1_APC_2_FBXO5_3_nTermu_;
  R94: _cell__CCNB_CDK1_Thr14_Tyr15u_CDKN1A_ + _cell__APC_FBXO5_1_FZR1_CDC20_2_Ser355p__FBXO5_APC_1_FZR1_3_Ser182u__FZR1_APC_2_FBXO5_3_nTermu_ => _cell__CCNB_CDK1_Thr14_Tyr15u_CDKN1A_ + _cell__APC_FBXO5_FZR1_CDC20_Ser355p_ + _cell__FZR1_APC_FBXO5_nTermp_ + _cell__FBXO5_APC_FZR1_Ser182u_; kPhCAEB*_cell__CCNB_CDK1_Thr14_Tyr15u_CDKN1A_*_cell__APC_FBXO5_1_FZR1_CDC20_2_Ser355p__FBXO5_APC_1_FZR1_3_Ser182u__FZR1_APC_2_FBXO5_3_nTermu_;
  R95: _cell__CCNE_CDKN1A_B_ + _cell__APC_FBXO5_FZR1_CDC20_1_Ser355u__FZR1_APC_1_FBXO5_nTermu_ => _cell__CCNE_CDKN1A_B_ + _cell__APC_FBXO5_FZR1_CDC20_Ser355u_ + _cell__FZR1_APC_FBXO5_nTermp_; kPhCdhE*_cell__CCNE_CDKN1A_B_*_cell__APC_FBXO5_FZR1_CDC20_1_Ser355u__FZR1_APC_1_FBXO5_nTermu_;
  R96: _cell__CCNE_CDKN1A_B_ + _cell__APC_FBXO5_FZR1_CDC20_1_Ser355p__FZR1_APC_1_FBXO5_nTermu_ => _cell__CCNE_CDKN1A_B_ + _cell__APC_FBXO5_FZR1_CDC20_Ser355p_ + _cell__FZR1_APC_FBXO5_nTermp_; kPhCdhE*_cell__CCNE_CDKN1A_B_*_cell__APC_FBXO5_FZR1_CDC20_1_Ser355p__FZR1_APC_1_FBXO5_nTermu_;
  R97: _cell__APC_FBXO5_1_FZR1_CDC20_2_Ser355u__FBXO5_APC_1_FZR1_3_Ser182u__FZR1_APC_2_FBXO5_3_nTermu_ => _cell__APC_FBXO5_FZR1_CDC20_1_Ser355u__FZR1_APC_1_FBXO5_nTermu_; kDeEmi1*_cell__APC_FBXO5_1_FZR1_CDC20_2_Ser355u__FBXO5_APC_1_FZR1_3_Ser182u__FZR1_APC_2_FBXO5_3_nTermu_;
  R98: _cell__FBXO5_APC_FZR1_Ser182u_ => ; kDeEmi1*_cell__FBXO5_APC_FZR1_Ser182u_;
  R99: _cell__APC_FBXO5_1_FZR1_CDC20_2_Ser355p__FBXO5_APC_1_FZR1_3_Ser182u__FZR1_APC_2_FBXO5_3_nTermu_ => _cell__APC_FBXO5_FZR1_CDC20_1_Ser355p__FZR1_APC_1_FBXO5_nTermu_; kDeEmi1*_cell__APC_FBXO5_1_FZR1_CDC20_2_Ser355p__FBXO5_APC_1_FZR1_3_Ser182u__FZR1_APC_2_FBXO5_3_nTermu_;
  R100: _cell__FBXO5_APC_FZR1_Ser182p_ => ; kDeEmi1*_cell__FBXO5_APC_FZR1_Ser182p_;
  R101: _cell__APC_FBXO5_1_FZR1_CDC20_2_Ser355u__FBXO5_APC_1_FZR1_3_Ser182u__FZR1_APC_2_FBXO5_3_nTermu_ => _cell__APC_FBXO5_FZR1_CDC20_1_Ser355u__FZR1_APC_1_FBXO5_nTermu_; kDeEmi2*_cell__APC_FBXO5_1_FZR1_CDC20_2_Ser355u__FBXO5_APC_1_FZR1_3_Ser182u__FZR1_APC_2_FBXO5_3_nTermu_;
  R102: _cell__APC_FBXO5_1_FZR1_CDC20_2_Ser355p__FBXO5_APC_1_FZR1_3_Ser182u__FZR1_APC_2_FBXO5_3_nTermu_ => _cell__APC_FBXO5_FZR1_CDC20_1_Ser355p__FZR1_APC_1_FBXO5_nTermu_; kDeEmi2*_cell__APC_FBXO5_1_FZR1_CDC20_2_Ser355p__FBXO5_APC_1_FZR1_3_Ser182u__FZR1_APC_2_FBXO5_3_nTermu_;
  R103: _cell__CCNA_CDKN1A_B_ + _cell__APC_FBXO5_1_FZR1_CDC20_2_Ser355u__FBXO5_APC_1_FZR1_3_Ser182u__FZR1_APC_2_FBXO5_3_nTermu_ => _cell__CCNA_CDKN1A_B_ + _cell__APC_FBXO5_FZR1_CDC20_1_Ser355u__FZR1_APC_1_FBXO5_nTermu_ + _cell__FBXO5_APC_FZR1_Ser182p_; kPhEmiA*_cell__CCNA_CDKN1A_B_*_cell__APC_FBXO5_1_FZR1_CDC20_2_Ser355u__FBXO5_APC_1_FZR1_3_Ser182u__FZR1_APC_2_FBXO5_3_nTermu_;
  R104: _cell__CCNA_CDKN1A_B_ + _cell__APC_FBXO5_1_FZR1_CDC20_2_Ser355p__FBXO5_APC_1_FZR1_3_Ser182u__FZR1_APC_2_FBXO5_3_nTermu_ => _cell__CCNA_CDKN1A_B_ + _cell__APC_FBXO5_FZR1_CDC20_1_Ser355p__FZR1_APC_1_FBXO5_nTermu_ + _cell__FBXO5_APC_FZR1_Ser182p_; kPhEmiA*_cell__CCNA_CDKN1A_B_*_cell__APC_FBXO5_1_FZR1_CDC20_2_Ser355p__FBXO5_APC_1_FZR1_3_Ser182u__FZR1_APC_2_FBXO5_3_nTermu_;
  R105: _cell__CCNB_CDK1_Thr14_Tyr15u_CDKN1A_ + _cell__APC_FBXO5_1_FZR1_CDC20_2_Ser355u__FBXO5_APC_1_FZR1_3_Ser182u__FZR1_APC_2_FBXO5_3_nTermu_ => _cell__CCNB_CDK1_Thr14_Tyr15u_CDKN1A_ + _cell__APC_FBXO5_FZR1_CDC20_1_Ser355u__FZR1_APC_1_FBXO5_nTermu_ + _cell__FBXO5_APC_FZR1_Ser182p_; kPhEmiB*_cell__CCNB_CDK1_Thr14_Tyr15u_CDKN1A_*_cell__APC_FBXO5_1_FZR1_CDC20_2_Ser355u__FBXO5_APC_1_FZR1_3_Ser182u__FZR1_APC_2_FBXO5_3_nTermu_;
  R106: _cell__CCNB_CDK1_Thr14_Tyr15u_CDKN1A_ + _cell__APC_FBXO5_1_FZR1_CDC20_2_Ser355p__FBXO5_APC_1_FZR1_3_Ser182u__FZR1_APC_2_FBXO5_3_nTermu_ => _cell__CCNB_CDK1_Thr14_Tyr15u_CDKN1A_ + _cell__APC_FBXO5_FZR1_CDC20_1_Ser355p__FZR1_APC_1_FBXO5_nTermu_ + _cell__FBXO5_APC_FZR1_Ser182p_; kPhEmiB*_cell__CCNB_CDK1_Thr14_Tyr15u_CDKN1A_*_cell__APC_FBXO5_1_FZR1_CDC20_2_Ser355p__FBXO5_APC_1_FZR1_3_Ser182u__FZR1_APC_2_FBXO5_3_nTermu_;
  R107: _cell__CCNA_CDKN1A_B_ + _cell__FBXO5_APC_FZR1_Ser182u_ => _cell__CCNA_CDKN1A_B_ + _cell__FBXO5_APC_FZR1_Ser182p_; kPhEmiA*_cell__CCNA_CDKN1A_B_*_cell__FBXO5_APC_FZR1_Ser182u_;
  R108: _cell__CCNB_CDK1_Thr14_Tyr15u_CDKN1A_ + _cell__FBXO5_APC_FZR1_Ser182u_ => _cell__CCNB_CDK1_Thr14_Tyr15u_CDKN1A_ + _cell__FBXO5_APC_FZR1_Ser182p_; kPhEmiB*_cell__CCNB_CDK1_Thr14_Tyr15u_CDKN1A_*_cell__FBXO5_APC_FZR1_Ser182u_;
  R109: _cell__FBXO5_APC_FZR1_Ser182p_ => _cell__FBXO5_APC_FZR1_Ser182u_; kDpEmi*_cell__FBXO5_APC_FZR1_Ser182p_;
  R110: _cell__FBXO5_APC_FZR1_Ser182p_ => ; kDeEmi3*_cell__FBXO5_APC_FZR1_Ser182p_;
  R111: => _cell__FOXM1_DBD_Thr600u_; kSyFox1;
  R112: _cell__E2F_DBD_1_RB1_Ser332u__FBXO5_promoter_E2F_1_ => _cell__FBXO5_APC_FZR1_Ser182u_ + _cell__E2F_DBD_1_RB1_Ser332u__FBXO5_promoter_E2F_1_; kSyEmi2*_cell__E2F_DBD_1_RB1_Ser332u__FBXO5_promoter_E2F_1_;
  R113: _cell__E2F_DBD_1_RB1_Ser332p__FBXO5_promoter_E2F_1_ => _cell__FBXO5_APC_FZR1_Ser182u_ + _cell__E2F_DBD_1_RB1_Ser332p__FBXO5_promoter_E2F_1_; kSyEmi2*_cell__E2F_DBD_1_RB1_Ser332p__FBXO5_promoter_E2F_1_;
  R114: _cell__CCNE_CDKN1A_B_ + _cell__FZR1_APC_FBXO5_nTermu_ => _cell__CCNE_CDKN1A_B_ + _cell__FZR1_APC_FBXO5_nTermp_; kPhCdhE*_cell__CCNE_CDKN1A_B_*_cell__FZR1_APC_FBXO5_nTermu_;
  R115: _cell__CCNA_CDKN1A_B_ + _cell__FZR1_APC_FBXO5_nTermu_ => _cell__CCNA_CDKN1A_B_ + _cell__FZR1_APC_FBXO5_nTermp_; kPhCdhA*_cell__CCNA_CDKN1A_B_*_cell__FZR1_APC_FBXO5_nTermu_;
  R116: _cell__CCNB_CDK1_Thr14_Tyr15u_CDKN1A_ + _cell__FZR1_APC_FBXO5_nTermu_ => _cell__CCNB_CDK1_Thr14_Tyr15u_CDKN1A_ + _cell__FZR1_APC_FBXO5_nTermp_; kPhCdhB*_cell__CCNB_CDK1_Thr14_Tyr15u_CDKN1A_*_cell__FZR1_APC_FBXO5_nTermu_;
  R117: _cell__FZR1_APC_FBXO5_nTermp_ => _cell__FZR1_APC_FBXO5_nTermu_; kDpCdh*_cell__FZR1_APC_FBXO5_nTermp_;
  R118: => _cell__CCNA_CDKN1A_B_; kSyCa1;
  R119: _cell__CCNA_CDKN1A_B_ => ; kDeCa1*_cell__CCNA_CDKN1A_B_;
  R120: _cell__CCNE_CDKN1A_B_ + _cell__CCNA_CDKN1A_B_ => _cell__CCNA_CDKN1A_B_; kPhCeA*_cell__CCNE_CDKN1A_B_*_cell__CCNA_CDKN1A_B_;
  R121: _cell__CCNA_CDKN1A_B_ + _cell__APC_FBXO5_FZR1_CDC20_1_Ser355u__FZR1_APC_1_FBXO5_nTermu_ => _cell__APC_FBXO5_FZR1_CDC20_1_Ser355u__FZR1_APC_1_FBXO5_nTermu_; kDeCa2*_cell__CCNA_CDKN1A_B_*_cell__APC_FBXO5_FZR1_CDC20_1_Ser355u__FZR1_APC_1_FBXO5_nTermu_;
  R122: _cell__CCNA_CDKN1A_B_ + _cell__APC_FBXO5_FZR1_CDC20_1_Ser355p__FZR1_APC_1_FBXO5_nTermu_ => _cell__APC_FBXO5_FZR1_CDC20_1_Ser355p__FZR1_APC_1_FBXO5_nTermu_; kDeCa2*_cell__CCNA_CDKN1A_B_*_cell__APC_FBXO5_FZR1_CDC20_1_Ser355p__FZR1_APC_1_FBXO5_nTermu_;
  R123: _cell__CCNA_CDKN1A_B_ + _cell__APC_FBXO5_FZR1_CDC20_1_Ser355p__CDC20_APC_1_ => _cell__APC_FBXO5_FZR1_CDC20_1_Ser355p__CDC20_APC_1_; kDeCa3*_cell__CCNA_CDKN1A_B_*_cell__APC_FBXO5_FZR1_CDC20_1_Ser355p__CDC20_APC_1_;
  R124: _cell__E2F_DBD_1_RB1_Ser332u__FOXM1_promoter_E2F_1_ => _cell__FOXM1_DBD_Thr600u_ + _cell__E2F_DBD_1_RB1_Ser332u__FOXM1_promoter_E2F_1_; kSyFox2*_cell__E2F_DBD_1_RB1_Ser332u__FOXM1_promoter_E2F_1_;
  R125: _cell__E2F_DBD_1_RB1_Ser332p__FOXM1_promoter_E2F_1_ => _cell__FOXM1_DBD_Thr600u_ + _cell__E2F_DBD_1_RB1_Ser332p__FOXM1_promoter_E2F_1_; kSyFox2*_cell__E2F_DBD_1_RB1_Ser332p__FOXM1_promoter_E2F_1_;
  R126: _cell__FOXM1_DBD_Thr600u_ => ; kDeFox1*_cell__FOXM1_DBD_Thr600u_;
  R127: _cell__FOXM1_DBD_Thr600p_ => ; kDeFox1*_cell__FOXM1_DBD_Thr600p_;
  R128: _cell__CCNB_promoter_FOXM1_1__FOXM1_DBD_1_Thr600p_ => _cell__CCNB_promoter_FOXM1_; kDeFox1*_cell__CCNB_promoter_FOXM1_1__FOXM1_DBD_1_Thr600p_;
  R129: _cell__CDC20_promoter_FOXM1_1__FOXM1_DBD_1_Thr600p_ => _cell__CDC20_promoter_FOXM1_; kDeFox1*_cell__CDC20_promoter_FOXM1_1__FOXM1_DBD_1_Thr600p_;
  R130: _cell__APC_FBXO5_FZR1_CDC20_1_Ser355u__FZR1_APC_1_FBXO5_nTermu_ + _cell__FOXM1_DBD_Thr600u_ => _cell__APC_FBXO5_FZR1_CDC20_1_Ser355u__FZR1_APC_1_FBXO5_nTermu_; kDeFox2*_cell__APC_FBXO5_FZR1_CDC20_1_Ser355u__FZR1_APC_1_FBXO5_nTermu_*_cell__FOXM1_DBD_Thr600u_;
  R131: _cell__APC_FBXO5_FZR1_CDC20_1_Ser355p__FZR1_APC_1_FBXO5_nTermu_ + _cell__FOXM1_DBD_Thr600u_ => _cell__APC_FBXO5_FZR1_CDC20_1_Ser355p__FZR1_APC_1_FBXO5_nTermu_; kDeFox2*_cell__APC_FBXO5_FZR1_CDC20_1_Ser355p__FZR1_APC_1_FBXO5_nTermu_*_cell__FOXM1_DBD_Thr600u_;
  R132: _cell__APC_FBXO5_FZR1_CDC20_1_Ser355u__FZR1_APC_1_FBXO5_nTermu_ + _cell__FOXM1_DBD_Thr600p_ => _cell__APC_FBXO5_FZR1_CDC20_1_Ser355u__FZR1_APC_1_FBXO5_nTermu_; kDeFox2*_cell__APC_FBXO5_FZR1_CDC20_1_Ser355u__FZR1_APC_1_FBXO5_nTermu_*_cell__FOXM1_DBD_Thr600p_;
  R133: _cell__APC_FBXO5_FZR1_CDC20_1_Ser355p__FZR1_APC_1_FBXO5_nTermu_ + _cell__FOXM1_DBD_Thr600p_ => _cell__APC_FBXO5_FZR1_CDC20_1_Ser355p__FZR1_APC_1_FBXO5_nTermu_; kDeFox2*_cell__APC_FBXO5_FZR1_CDC20_1_Ser355p__FZR1_APC_1_FBXO5_nTermu_*_cell__FOXM1_DBD_Thr600p_;
  R134: _cell__APC_FBXO5_FZR1_CDC20_1_Ser355u__FZR1_APC_1_FBXO5_nTermu_ + _cell__CCNB_promoter_FOXM1_1__FOXM1_DBD_1_Thr600p_ => _cell__APC_FBXO5_FZR1_CDC20_1_Ser355u__FZR1_APC_1_FBXO5_nTermu_ + _cell__CCNB_promoter_FOXM1_; kDeFox2*_cell__APC_FBXO5_FZR1_CDC20_1_Ser355u__FZR1_APC_1_FBXO5_nTermu_*_cell__CCNB_promoter_FOXM1_1__FOXM1_DBD_1_Thr600p_;
  R135: _cell__APC_FBXO5_FZR1_CDC20_1_Ser355p__FZR1_APC_1_FBXO5_nTermu_ + _cell__CCNB_promoter_FOXM1_1__FOXM1_DBD_1_Thr600p_ => _cell__APC_FBXO5_FZR1_CDC20_1_Ser355p__FZR1_APC_1_FBXO5_nTermu_ + _cell__CCNB_promoter_FOXM1_; kDeFox2*_cell__APC_FBXO5_FZR1_CDC20_1_Ser355p__FZR1_APC_1_FBXO5_nTermu_*_cell__CCNB_promoter_FOXM1_1__FOXM1_DBD_1_Thr600p_;
  R136: _cell__APC_FBXO5_FZR1_CDC20_1_Ser355u__FZR1_APC_1_FBXO5_nTermu_ + _cell__CDC20_promoter_FOXM1_1__FOXM1_DBD_1_Thr600p_ => _cell__APC_FBXO5_FZR1_CDC20_1_Ser355u__FZR1_APC_1_FBXO5_nTermu_ + _cell__CDC20_promoter_FOXM1_; kDeFox2*_cell__APC_FBXO5_FZR1_CDC20_1_Ser355u__FZR1_APC_1_FBXO5_nTermu_*_cell__CDC20_promoter_FOXM1_1__FOXM1_DBD_1_Thr600p_;
  R137: _cell__APC_FBXO5_FZR1_CDC20_1_Ser355p__FZR1_APC_1_FBXO5_nTermu_ + _cell__CDC20_promoter_FOXM1_1__FOXM1_DBD_1_Thr600p_ => _cell__APC_FBXO5_FZR1_CDC20_1_Ser355p__FZR1_APC_1_FBXO5_nTermu_ + _cell__CDC20_promoter_FOXM1_; kDeFox2*_cell__APC_FBXO5_FZR1_CDC20_1_Ser355p__FZR1_APC_1_FBXO5_nTermu_*_cell__CDC20_promoter_FOXM1_1__FOXM1_DBD_1_Thr600p_;
  R138: _cell__CCNE_CDKN1A_B_ + _cell__FOXM1_DBD_Thr600u_ => _cell__CCNE_CDKN1A_B_ + _cell__FOXM1_DBD_Thr600p_; kPhFoxE*_cell__CCNE_CDKN1A_B_*_cell__FOXM1_DBD_Thr600u_;
  R139: _cell__CCNA_CDKN1A_B_ + _cell__FOXM1_DBD_Thr600u_ => _cell__CCNA_CDKN1A_B_ + _cell__FOXM1_DBD_Thr600p_; kPhFoxA*_cell__CCNA_CDKN1A_B_*_cell__FOXM1_DBD_Thr600u_;
  R140: _cell__CCNB_CDK1_Thr14_Tyr15u_CDKN1A_ + _cell__FOXM1_DBD_Thr600u_ => _cell__CCNB_CDK1_Thr14_Tyr15u_CDKN1A_ + _cell__FOXM1_DBD_Thr600p_; kPhFoxB*_cell__CCNB_CDK1_Thr14_Tyr15u_CDKN1A_*_cell__FOXM1_DBD_Thr600u_;
  R141: _cell__FOXM1_DBD_Thr600p_ => _cell__FOXM1_DBD_Thr600u_; kDpFox*_cell__FOXM1_DBD_Thr600p_;
  R142: _cell__CDC20_promoter_FOXM1_1__FOXM1_DBD_1_Thr600p_ => _cell__FOXM1_DBD_Thr600u_ + _cell__CDC20_promoter_FOXM1_; kDpFox*_cell__CDC20_promoter_FOXM1_1__FOXM1_DBD_1_Thr600p_;
  R143: _cell__CCNB_promoter_FOXM1_1__FOXM1_DBD_1_Thr600p_ => _cell__FOXM1_DBD_Thr600u_ + _cell__CCNB_promoter_FOXM1_; kDpFox*_cell__CCNB_promoter_FOXM1_1__FOXM1_DBD_1_Thr600p_;
  R144: => _cell__CCNB_CDK1_Thr14_Tyr15u_CDKN1A_; kSyCb1;
  R145: _cell__CCNB_promoter_FOXM1_1__FOXM1_DBD_1_Thr600p_ => _cell__CCNB_CDK1_Thr14_Tyr15u_CDKN1A_ + _cell__CCNB_promoter_FOXM1_1__FOXM1_DBD_1_Thr600p_; kSyCb2*_cell__CCNB_promoter_FOXM1_1__FOXM1_DBD_1_Thr600p_;
  R146: _cell__CCNB_CDK1_Thr14_Tyr15u_CDKN1A_ => ; kDeCb1*_cell__CCNB_CDK1_Thr14_Tyr15u_CDKN1A_;
  R147: _cell__CCNB_CDK1_Thr14_Tyr15p_CDKN1A_ => ; kDeCb1*_cell__CCNB_CDK1_Thr14_Tyr15p_CDKN1A_;
  R148: _cell__CCNB_CDK1_Thr14_Tyr15u_CDKN1A_ + _cell__APC_FBXO5_FZR1_CDC20_1_Ser355u__FZR1_APC_1_FBXO5_nTermu_ => _cell__APC_FBXO5_FZR1_CDC20_1_Ser355u__FZR1_APC_1_FBXO5_nTermu_; kDeCb2*_cell__CCNB_CDK1_Thr14_Tyr15u_CDKN1A_*_cell__APC_FBXO5_FZR1_CDC20_1_Ser355u__FZR1_APC_1_FBXO5_nTermu_;
  R149: _cell__CCNB_CDK1_Thr14_Tyr15u_CDKN1A_ + _cell__APC_FBXO5_FZR1_CDC20_1_Ser355p__FZR1_APC_1_FBXO5_nTermu_ => _cell__APC_FBXO5_FZR1_CDC20_1_Ser355p__FZR1_APC_1_FBXO5_nTermu_; kDeCb2*_cell__CCNB_CDK1_Thr14_Tyr15u_CDKN1A_*_cell__APC_FBXO5_FZR1_CDC20_1_Ser355p__FZR1_APC_1_FBXO5_nTermu_;
  R150: _cell__APC_FBXO5_FZR1_CDC20_1_Ser355u__FZR1_APC_1_FBXO5_nTermu_ + _cell__CCNB_CDK1_Thr14_Tyr15p_CDKN1A_ => _cell__APC_FBXO5_FZR1_CDC20_1_Ser355u__FZR1_APC_1_FBXO5_nTermu_; kDeCb2*_cell__APC_FBXO5_FZR1_CDC20_1_Ser355u__FZR1_APC_1_FBXO5_nTermu_*_cell__CCNB_CDK1_Thr14_Tyr15p_CDKN1A_;
  R151: _cell__APC_FBXO5_FZR1_CDC20_1_Ser355p__FZR1_APC_1_FBXO5_nTermu_ + _cell__CCNB_CDK1_Thr14_Tyr15p_CDKN1A_ => _cell__APC_FBXO5_FZR1_CDC20_1_Ser355p__FZR1_APC_1_FBXO5_nTermu_; kDeCb2*_cell__APC_FBXO5_FZR1_CDC20_1_Ser355p__FZR1_APC_1_FBXO5_nTermu_*_cell__CCNB_CDK1_Thr14_Tyr15p_CDKN1A_;
  R152: _cell__CCNB_CDK1_Thr14_Tyr15u_CDKN1A_ + _cell__APC_FBXO5_FZR1_CDC20_1_Ser355p__CDC20_APC_1_ => _cell__APC_FBXO5_FZR1_CDC20_1_Ser355p__CDC20_APC_1_; kDeCb3*_cell__CCNB_CDK1_Thr14_Tyr15u_CDKN1A_*_cell__APC_FBXO5_FZR1_CDC20_1_Ser355p__CDC20_APC_1_;
  R153: _cell__APC_FBXO5_FZR1_CDC20_1_Ser355p__CDC20_APC_1_ + _cell__CCNB_CDK1_Thr14_Tyr15p_CDKN1A_ => _cell__APC_FBXO5_FZR1_CDC20_1_Ser355p__CDC20_APC_1_; kDeCb3*_cell__APC_FBXO5_FZR1_CDC20_1_Ser355p__CDC20_APC_1_*_cell__CCNB_CDK1_Thr14_Tyr15p_CDKN1A_;
  R154: _cell__CDC20_APC_ => ; kDeCdc_1*_cell__CDC20_APC_;
  R155: _cell__APC_FBXO5_FZR1_CDC20_1_Ser355p__CDC20_APC_1_ => _cell__APC_FBXO5_FZR1_CDC20_Ser355p_; kDeCdc_1*_cell__APC_FBXO5_FZR1_CDC20_1_Ser355p__CDC20_APC_1_;
  R156: _cell__CDC20_APC_ + _cell__APC_FBXO5_FZR1_CDC20_1_Ser355u__FZR1_APC_1_FBXO5_nTermu_ => _cell__APC_FBXO5_FZR1_CDC20_1_Ser355u__FZR1_APC_1_FBXO5_nTermu_; kDeCdc_2*_cell__CDC20_APC_*_cell__APC_FBXO5_FZR1_CDC20_1_Ser355u__FZR1_APC_1_FBXO5_nTermu_;
  R157: _cell__CDC20_APC_ + _cell__APC_FBXO5_FZR1_CDC20_1_Ser355p__FZR1_APC_1_FBXO5_nTermu_ => _cell__APC_FBXO5_FZR1_CDC20_1_Ser355p__FZR1_APC_1_FBXO5_nTermu_; kDeCdc_2*_cell__CDC20_APC_*_cell__APC_FBXO5_FZR1_CDC20_1_Ser355p__FZR1_APC_1_FBXO5_nTermu_;
  R158: _cell__APC_FBXO5_FZR1_CDC20_1_Ser355p__CDC20_APC_1_ + _cell__APC_FBXO5_FZR1_CDC20_1_Ser355u__FZR1_APC_1_FBXO5_nTermu_ => _cell__APC_FBXO5_FZR1_CDC20_Ser355p_ + _cell__APC_FBXO5_FZR1_CDC20_1_Ser355u__FZR1_APC_1_FBXO5_nTermu_; kDeCdc_2*_cell__APC_FBXO5_FZR1_CDC20_1_Ser355p__CDC20_APC_1_*_cell__APC_FBXO5_FZR1_CDC20_1_Ser355u__FZR1_APC_1_FBXO5_nTermu_;
  R159: _cell__APC_FBXO5_FZR1_CDC20_1_Ser355p__CDC20_APC_1_ + _cell__APC_FBXO5_FZR1_CDC20_1_Ser355p__FZR1_APC_1_FBXO5_nTermu_ => _cell__APC_FBXO5_FZR1_CDC20_Ser355p_ + _cell__APC_FBXO5_FZR1_CDC20_1_Ser355p__FZR1_APC_1_FBXO5_nTermu_; kDeCdc_2*_cell__APC_FBXO5_FZR1_CDC20_1_Ser355p__CDC20_APC_1_*_cell__APC_FBXO5_FZR1_CDC20_1_Ser355p__FZR1_APC_1_FBXO5_nTermu_;
  R160: => _cell__CDC20_APC_; kSyCdc_1;
  R161: _cell__CDC20_promoter_FOXM1_1__FOXM1_DBD_1_Thr600p_ => _cell__CDC20_APC_ + _cell__CDC20_promoter_FOXM1_1__FOXM1_DBD_1_Thr600p_; kSyCdc_2*_cell__CDC20_promoter_FOXM1_1__FOXM1_DBD_1_Thr600p_;
  R162: _cell__FOXM1_DBD_Thr600p_ + _cell__CDC20_promoter_FOXM1_ => _cell__CDC20_promoter_FOXM1_1__FOXM1_DBD_1_Thr600p_; kAsFPcdc*_cell__FOXM1_DBD_Thr600p_*_cell__CDC20_promoter_FOXM1_;
  R163: _cell__CDC20_promoter_FOXM1_1__FOXM1_DBD_1_Thr600p_ => _cell__FOXM1_DBD_Thr600p_ + _cell__CDC20_promoter_FOXM1_; kDiFPcdc*_cell__CDC20_promoter_FOXM1_1__FOXM1_DBD_1_Thr600p_;
  R164: _cell__CCNB_CDK1_Thr14_Tyr15u_CDKN1A_ + _cell__WEE1_Ser123u_ => _cell__WEE1_Ser123u_ + _cell__CCNB_CDK1_Thr14_Tyr15p_CDKN1A_; kWee2*_cell__CCNB_CDK1_Thr14_Tyr15u_CDKN1A_*_cell__WEE1_Ser123u_;
  R165: _cell__CCNB_CDK1_Thr14_Tyr15u_CDKN1A_ + _cell__WEE1_Ser123p_ => _cell__CCNB_CDK1_Thr14_Tyr15p_CDKN1A_ + _cell__WEE1_Ser123p_; kWee1*_cell__CCNB_CDK1_Thr14_Tyr15u_CDKN1A_*_cell__WEE1_Ser123p_;
  R166: _cell__CCNB_CDK1_Thr14_Tyr15p_CDKN1A_ + _cell__CDC25_pSitesp_ => _cell__CCNB_CDK1_Thr14_Tyr15u_CDKN1A_ + _cell__CDC25_pSitesp_; kCdc25_2*_cell__CCNB_CDK1_Thr14_Tyr15p_CDKN1A_*_cell__CDC25_pSitesp_;
  R167: _cell__CCNB_CDK1_Thr14_Tyr15p_CDKN1A_ + _cell__CDC25_pSitesu_ => _cell__CCNB_CDK1_Thr14_Tyr15u_CDKN1A_ + _cell__CDC25_pSitesu_; kCdc25_1*_cell__CCNB_CDK1_Thr14_Tyr15p_CDKN1A_*_cell__CDC25_pSitesu_;
  R168: _cell__CCNB_CDK1_Thr14_Tyr15u_CDKN1A_ + _cell__CDC25_pSitesu_ => _cell__CCNB_CDK1_Thr14_Tyr15u_CDKN1A_ + _cell__CDC25_pSitesp_; kPhC25B*_cell__CCNB_CDK1_Thr14_Tyr15u_CDKN1A_*_cell__CDC25_pSitesu_;
  R169: _cell__CCNA_CDKN1A_B_ + _cell__CDC25_pSitesu_ => _cell__CCNA_CDKN1A_B_ + _cell__CDC25_pSitesp_; kPhC25A*_cell__CCNA_CDKN1A_B_*_cell__CDC25_pSitesu_;
  R170: _cell__PPP2R2B_ENSA_ARPP19_ + _cell__CDC25_pSitesp_ => _cell__PPP2R2B_ENSA_ARPP19_ + _cell__CDC25_pSitesu_; kDpCdc25*_cell__PPP2R2B_ENSA_ARPP19_*_cell__CDC25_pSitesp_;
  R171: _cell__PPP2R2B_ENSA_ARPP19_ + _cell__WEE1_Ser123p_ => _cell__PPP2R2B_ENSA_ARPP19_ + _cell__WEE1_Ser123u_; kDpWee*_cell__PPP2R2B_ENSA_ARPP19_*_cell__WEE1_Ser123p_;
  R172: _cell__CCNA_CDKN1A_B_ + _cell__WEE1_Ser123u_ => _cell__CCNA_CDKN1A_B_ + _cell__WEE1_Ser123p_; kPhWeeA*_cell__CCNA_CDKN1A_B_*_cell__WEE1_Ser123u_;
  R173: _cell__CCNB_CDK1_Thr14_Tyr15u_CDKN1A_ + _cell__WEE1_Ser123u_ => _cell__CCNB_CDK1_Thr14_Tyr15u_CDKN1A_ + _cell__WEE1_Ser123p_; kPhWeeB*_cell__CCNB_CDK1_Thr14_Tyr15u_CDKN1A_*_cell__WEE1_Ser123u_;
  R174: _cell__CCNB_CDK1_Thr14_Tyr15u_CDKN1A_ + _cell__MASTL_Thr198u_ => _cell__CCNB_CDK1_Thr14_Tyr15u_CDKN1A_ + _cell__MASTL_Thr198p_; kPhGw*_cell__CCNB_CDK1_Thr14_Tyr15u_CDKN1A_*_cell__MASTL_Thr198u_;
  R175: _cell__MASTL_Thr198p_ => _cell__MASTL_Thr198u_; kDpGw1*_cell__MASTL_Thr198p_;
  R176: _cell__PPP2R2B_ENSA_ARPP19_ + _cell__MASTL_Thr198p_ => _cell__PPP2R2B_ENSA_ARPP19_ + _cell__MASTL_Thr198u_; kDpGw2*_cell__PPP2R2B_ENSA_ARPP19_*_cell__MASTL_Thr198p_;
  R177: _cell__MASTL_Thr198p_ + _cell__ENSA_ARPP19_PPP2R2B_Ser62_Ser67u_ => _cell__MASTL_Thr198p_ + _cell__ENSA_ARPP19_PPP2R2B_Ser62_Ser67p_; kPhEnsa*_cell__MASTL_Thr198p_*_cell__ENSA_ARPP19_PPP2R2B_Ser62_Ser67u_;
  R178: _cell__ENSA_ARPP19_PPP2R2B_1_Ser62_Ser67p__PPP2R2B_ENSA_ARPP19_1_ => _cell__PPP2R2B_ENSA_ARPP19_ + _cell__ENSA_ARPP19_PPP2R2B_Ser62_Ser67u_; kDpEnsa*_cell__ENSA_ARPP19_PPP2R2B_1_Ser62_Ser67p__PPP2R2B_ENSA_ARPP19_1_;
  R179: => _cell__FBXO5_APC_FZR1_Ser182u_; kSyEmi1;
  R180: _cell__CCNE_promoter_E2F_1__E2F_DBD_1_RB1_Ser332u_ => _cell__CCNE_CDKN1A_B_ + _cell__CCNE_promoter_E2F_1__E2F_DBD_1_RB1_Ser332u_; kSyCe2*_cell__CCNE_promoter_E2F_1__E2F_DBD_1_RB1_Ser332u_;
  R181: _cell__CCNE_promoter_E2F_1__E2F_DBD_1_RB1_Ser332p_ => _cell__CCNE_CDKN1A_B_ + _cell__CCNE_promoter_E2F_1__E2F_DBD_1_RB1_Ser332p_; kSyCe2*_cell__CCNE_promoter_E2F_1__E2F_DBD_1_RB1_Ser332p_;
  R182: _cell__CCNB_CDK1_Thr14_Tyr15u_CDKN1A_ + _cell__APC_FBXO5_FZR1_CDC20_1_Ser355u__FZR1_APC_1_FBXO5_nTermu_ => _cell__CCNB_CDK1_Thr14_Tyr15u_CDKN1A_ + _cell__APC_FBXO5_FZR1_CDC20_Ser355u_ + _cell__FZR1_APC_FBXO5_nTermp_; kPhCdhB*_cell__CCNB_CDK1_Thr14_Tyr15u_CDKN1A_*_cell__APC_FBXO5_FZR1_CDC20_1_Ser355u__FZR1_APC_1_FBXO5_nTermu_;
  R183: _cell__CCNB_CDK1_Thr14_Tyr15u_CDKN1A_ + _cell__APC_FBXO5_FZR1_CDC20_1_Ser355p__FZR1_APC_1_FBXO5_nTermu_ => _cell__CCNB_CDK1_Thr14_Tyr15u_CDKN1A_ + _cell__APC_FBXO5_FZR1_CDC20_Ser355p_ + _cell__FZR1_APC_FBXO5_nTermp_; kPhCdhB*_cell__CCNB_CDK1_Thr14_Tyr15u_CDKN1A_*_cell__APC_FBXO5_FZR1_CDC20_1_Ser355p__FZR1_APC_1_FBXO5_nTermu_;
  R184: _cell__E2F_DBD_RB1_Ser332u_ + _cell__RB1_E2F_Ser807_Ser811u_ => _cell__E2F_DBD_RB1_1_Ser332u__RB1_E2F_1_Ser807_Ser811u_; kAsE2fRb*_cell__E2F_DBD_RB1_Ser332u_*_cell__RB1_E2F_Ser807_Ser811u_;
  R185: _cell__E2F_DBD_RB1_Ser332p_ + _cell__RB1_E2F_Ser807_Ser811u_ => _cell__E2F_DBD_RB1_1_Ser332p__RB1_E2F_1_Ser807_Ser811u_; kAsE2fRb*_cell__E2F_DBD_RB1_Ser332p_*_cell__RB1_E2F_Ser807_Ser811u_;
  R186: _cell__E2F_DBD_RB1_1_Ser332u__RB1_E2F_1_Ser807_Ser811u_ => _cell__E2F_DBD_RB1_Ser332u_ + _cell__RB1_E2F_Ser807_Ser811u_; kDiE2fRb*_cell__E2F_DBD_RB1_1_Ser332u__RB1_E2F_1_Ser807_Ser811u_;
  R187: _cell__E2F_DBD_RB1_1_Ser332p__RB1_E2F_1_Ser807_Ser811u_ => _cell__E2F_DBD_RB1_Ser332p_ + _cell__RB1_E2F_Ser807_Ser811u_; kDiE2fRb*_cell__E2F_DBD_RB1_1_Ser332p__RB1_E2F_1_Ser807_Ser811u_;
  R188: _cell__APC_FBXO5_FZR1_CDC20_Ser355u_ + _cell__FZR1_APC_FBXO5_nTermu_ => _cell__APC_FBXO5_FZR1_CDC20_1_Ser355u__FZR1_APC_1_FBXO5_nTermu_; kAsACdh*_cell__APC_FBXO5_FZR1_CDC20_Ser355u_*_cell__FZR1_APC_FBXO5_nTermu_;
  R189: _cell__APC_FBXO5_FZR1_CDC20_Ser355p_ + _cell__FZR1_APC_FBXO5_nTermu_ => _cell__APC_FBXO5_FZR1_CDC20_1_Ser355p__FZR1_APC_1_FBXO5_nTermu_; kAsACdh*_cell__APC_FBXO5_FZR1_CDC20_Ser355p_*_cell__FZR1_APC_FBXO5_nTermu_;
  R190: _cell__APC_FBXO5_FZR1_CDC20_1_Ser355u__FZR1_APC_1_FBXO5_nTermu_ => _cell__APC_FBXO5_FZR1_CDC20_Ser355u_ + _cell__FZR1_APC_FBXO5_nTermu_; kDiACdh*_cell__APC_FBXO5_FZR1_CDC20_1_Ser355u__FZR1_APC_1_FBXO5_nTermu_;
  R191: _cell__APC_FBXO5_FZR1_CDC20_1_Ser355p__FZR1_APC_1_FBXO5_nTermu_ => _cell__APC_FBXO5_FZR1_CDC20_Ser355p_ + _cell__FZR1_APC_FBXO5_nTermu_; kDiACdh*_cell__APC_FBXO5_FZR1_CDC20_1_Ser355p__FZR1_APC_1_FBXO5_nTermu_;
  R192: _cell__APC_FBXO5_FZR1_CDC20_1_Ser355u__FZR1_APC_1_FBXO5_nTermu_ + _cell__FBXO5_APC_FZR1_Ser182u_ => _cell__APC_FBXO5_1_FZR1_CDC20_2_Ser355u__FBXO5_APC_1_FZR1_3_Ser182u__FZR1_APC_2_FBXO5_3_nTermu_; kAsACE*_cell__APC_FBXO5_FZR1_CDC20_1_Ser355u__FZR1_APC_1_FBXO5_nTermu_*_cell__FBXO5_APC_FZR1_Ser182u_;
  R193: _cell__FBXO5_APC_FZR1_Ser182u_ + _cell__APC_FBXO5_FZR1_CDC20_1_Ser355p__FZR1_APC_1_FBXO5_nTermu_ => _cell__APC_FBXO5_1_FZR1_CDC20_2_Ser355p__FBXO5_APC_1_FZR1_3_Ser182u__FZR1_APC_2_FBXO5_3_nTermu_; kAsACE*_cell__FBXO5_APC_FZR1_Ser182u_*_cell__APC_FBXO5_FZR1_CDC20_1_Ser355p__FZR1_APC_1_FBXO5_nTermu_;
  R194: _cell__APC_FBXO5_1_FZR1_CDC20_2_Ser355u__FBXO5_APC_1_FZR1_3_Ser182u__FZR1_APC_2_FBXO5_3_nTermu_ => _cell__APC_FBXO5_FZR1_CDC20_1_Ser355u__FZR1_APC_1_FBXO5_nTermu_ + _cell__FBXO5_APC_FZR1_Ser182u_; kDiACE*_cell__APC_FBXO5_1_FZR1_CDC20_2_Ser355u__FBXO5_APC_1_FZR1_3_Ser182u__FZR1_APC_2_FBXO5_3_nTermu_;
  R195: _cell__APC_FBXO5_1_FZR1_CDC20_2_Ser355p__FBXO5_APC_1_FZR1_3_Ser182u__FZR1_APC_2_FBXO5_3_nTermu_ => _cell__FBXO5_APC_FZR1_Ser182u_ + _cell__APC_FBXO5_FZR1_CDC20_1_Ser355p__FZR1_APC_1_FBXO5_nTermu_; kDiACE*_cell__APC_FBXO5_1_FZR1_CDC20_2_Ser355p__FBXO5_APC_1_FZR1_3_Ser182u__FZR1_APC_2_FBXO5_3_nTermu_;
  R196: _cell__CDC20_APC_ + _cell__APC_FBXO5_FZR1_CDC20_Ser355p_ => _cell__APC_FBXO5_FZR1_CDC20_1_Ser355p__CDC20_APC_1_; kAspACdc*_cell__CDC20_APC_*_cell__APC_FBXO5_FZR1_CDC20_Ser355p_;
  R197: _cell__APC_FBXO5_FZR1_CDC20_1_Ser355p__CDC20_APC_1_ => _cell__CDC20_APC_ + _cell__APC_FBXO5_FZR1_CDC20_Ser355p_; kDipACdc*_cell__APC_FBXO5_FZR1_CDC20_1_Ser355p__CDC20_APC_1_;
  R198: _cell__PPP2R2B_ENSA_ARPP19_ + _cell__ENSA_ARPP19_PPP2R2B_Ser62_Ser67p_ => _cell__ENSA_ARPP19_PPP2R2B_1_Ser62_Ser67p__PPP2R2B_ENSA_ARPP19_1_; kAspEB55*_cell__PPP2R2B_ENSA_ARPP19_*_cell__ENSA_ARPP19_PPP2R2B_Ser62_Ser67p_;
  R199: _cell__ENSA_ARPP19_PPP2R2B_1_Ser62_Ser67p__PPP2R2B_ENSA_ARPP19_1_ => _cell__PPP2R2B_ENSA_ARPP19_ + _cell__ENSA_ARPP19_PPP2R2B_Ser62_Ser67p_; kDipEB55*_cell__ENSA_ARPP19_PPP2R2B_1_Ser62_Ser67p__PPP2R2B_ENSA_ARPP19_1_;
  R200: _cell__E2F_DBD_RB1_Ser332u_ + _cell__CCNE_promoter_E2F_ => _cell__CCNE_promoter_E2F_1__E2F_DBD_1_RB1_Ser332u_; kAsEPx*_cell__E2F_DBD_RB1_Ser332u_*_cell__CCNE_promoter_E2F_;
  R201: _cell__E2F_DBD_RB1_Ser332p_ + _cell__CCNE_promoter_E2F_ => _cell__CCNE_promoter_E2F_1__E2F_DBD_1_RB1_Ser332p_; kAsEPx*_cell__E2F_DBD_RB1_Ser332p_*_cell__CCNE_promoter_E2F_;
  R202: _cell__CCNE_promoter_E2F_1__E2F_DBD_1_RB1_Ser332u_ => _cell__E2F_DBD_RB1_Ser332u_ + _cell__CCNE_promoter_E2F_; kDiEPx*_cell__CCNE_promoter_E2F_1__E2F_DBD_1_RB1_Ser332u_;
  R203: _cell__CCNE_promoter_E2F_1__E2F_DBD_1_RB1_Ser332p_ => _cell__E2F_DBD_RB1_Ser332p_ + _cell__CCNE_promoter_E2F_; kDiEPx*_cell__CCNE_promoter_E2F_1__E2F_DBD_1_RB1_Ser332p_;
  R204: _cell__E2F_DBD_RB1_Ser332u_ + _cell__CCNA_promoter_E2F_ => _cell__CCNA_promoter_E2F_1__E2F_DBD_1_RB1_Ser332u_; kAsEPx*_cell__E2F_DBD_RB1_Ser332u_*_cell__CCNA_promoter_E2F_;
  R205: _cell__E2F_DBD_RB1_Ser332p_ + _cell__CCNA_promoter_E2F_ => _cell__CCNA_promoter_E2F_1__E2F_DBD_1_RB1_Ser332p_; kAsEPx*_cell__E2F_DBD_RB1_Ser332p_*_cell__CCNA_promoter_E2F_;
  R206: _cell__CCNA_promoter_E2F_1__E2F_DBD_1_RB1_Ser332u_ => _cell__E2F_DBD_RB1_Ser332u_ + _cell__CCNA_promoter_E2F_; kDiEPx*_cell__CCNA_promoter_E2F_1__E2F_DBD_1_RB1_Ser332u_;
  R207: _cell__CCNA_promoter_E2F_1__E2F_DBD_1_RB1_Ser332p_ => _cell__E2F_DBD_RB1_Ser332p_ + _cell__CCNA_promoter_E2F_; kDiEPx*_cell__CCNA_promoter_E2F_1__E2F_DBD_1_RB1_Ser332p_;
  R208: _cell__E2F_DBD_RB1_Ser332u_ + _cell__E2F_promoter_E2F_ => _cell__E2F_DBD_1_RB1_Ser332u__E2F_promoter_E2F_1_; kAsEPx*_cell__E2F_DBD_RB1_Ser332u_*_cell__E2F_promoter_E2F_;
  R209: _cell__E2F_DBD_RB1_Ser332p_ + _cell__E2F_promoter_E2F_ => _cell__E2F_DBD_1_RB1_Ser332p__E2F_promoter_E2F_1_; kAsEPx*_cell__E2F_DBD_RB1_Ser332p_*_cell__E2F_promoter_E2F_;
  R210: _cell__E2F_DBD_1_RB1_Ser332u__E2F_promoter_E2F_1_ => _cell__E2F_DBD_RB1_Ser332u_ + _cell__E2F_promoter_E2F_; kDiEPx*_cell__E2F_DBD_1_RB1_Ser332u__E2F_promoter_E2F_1_;
  R211: _cell__E2F_DBD_1_RB1_Ser332p__E2F_promoter_E2F_1_ => _cell__E2F_DBD_RB1_Ser332p_ + _cell__E2F_promoter_E2F_; kDiEPx*_cell__E2F_DBD_1_RB1_Ser332p__E2F_promoter_E2F_1_;
  R212: _cell__E2F_DBD_RB1_Ser332u_ + _cell__FBXO5_promoter_E2F_ => _cell__E2F_DBD_1_RB1_Ser332u__FBXO5_promoter_E2F_1_; kAsEPx*_cell__E2F_DBD_RB1_Ser332u_*_cell__FBXO5_promoter_E2F_;
  R213: _cell__E2F_DBD_RB1_Ser332p_ + _cell__FBXO5_promoter_E2F_ => _cell__E2F_DBD_1_RB1_Ser332p__FBXO5_promoter_E2F_1_; kAsEPx*_cell__E2F_DBD_RB1_Ser332p_*_cell__FBXO5_promoter_E2F_;
  R214: _cell__E2F_DBD_1_RB1_Ser332u__FBXO5_promoter_E2F_1_ => _cell__E2F_DBD_RB1_Ser332u_ + _cell__FBXO5_promoter_E2F_; kDiEPx*_cell__E2F_DBD_1_RB1_Ser332u__FBXO5_promoter_E2F_1_;
  R215: _cell__E2F_DBD_1_RB1_Ser332p__FBXO5_promoter_E2F_1_ => _cell__E2F_DBD_RB1_Ser332p_ + _cell__FBXO5_promoter_E2F_; kDiEPx*_cell__E2F_DBD_1_RB1_Ser332p__FBXO5_promoter_E2F_1_;
  R216: _cell__E2F_DBD_RB1_Ser332u_ + _cell__FOXM1_promoter_E2F_ => _cell__E2F_DBD_1_RB1_Ser332u__FOXM1_promoter_E2F_1_; kAsEPx*_cell__E2F_DBD_RB1_Ser332u_*_cell__FOXM1_promoter_E2F_;
  R217: _cell__E2F_DBD_RB1_Ser332p_ + _cell__FOXM1_promoter_E2F_ => _cell__E2F_DBD_1_RB1_Ser332p__FOXM1_promoter_E2F_1_; kAsEPx*_cell__E2F_DBD_RB1_Ser332p_*_cell__FOXM1_promoter_E2F_;
  R218: _cell__E2F_DBD_1_RB1_Ser332u__FOXM1_promoter_E2F_1_ => _cell__E2F_DBD_RB1_Ser332u_ + _cell__FOXM1_promoter_E2F_; kDiEPx*_cell__E2F_DBD_1_RB1_Ser332u__FOXM1_promoter_E2F_1_;
  R219: _cell__E2F_DBD_1_RB1_Ser332p__FOXM1_promoter_E2F_1_ => _cell__E2F_DBD_RB1_Ser332p_ + _cell__FOXM1_promoter_E2F_; kDiEPx*_cell__E2F_DBD_1_RB1_Ser332p__FOXM1_promoter_E2F_1_;
  R220: => _cell__SKP2; kSySkp2;
  R221: _cell__SKP2 => ; kDeSkp2_1*_cell__SKP2;
  R222: _cell__APC_FBXO5_FZR1_CDC20_1_Ser355u__FZR1_APC_1_FBXO5_nTermu_ + _cell__SKP2 => _cell__APC_FBXO5_FZR1_CDC20_1_Ser355u__FZR1_APC_1_FBXO5_nTermu_; kDeSkp2_2*_cell__APC_FBXO5_FZR1_CDC20_1_Ser355u__FZR1_APC_1_FBXO5_nTermu_*_cell__SKP2;
  R223: _cell__APC_FBXO5_FZR1_CDC20_1_Ser355p__FZR1_APC_1_FBXO5_nTermu_ + _cell__SKP2 => _cell__APC_FBXO5_FZR1_CDC20_1_Ser355p__FZR1_APC_1_FBXO5_nTermu_; kDeSkp2_2*_cell__APC_FBXO5_FZR1_CDC20_1_Ser355p__FZR1_APC_1_FBXO5_nTermu_*_cell__SKP2;
  R224: _cell__TP53_DBD_Ser15p_ + _cell__CDKN1A_promoter_TP53_ => _cell__CDKN1A_promoter_TP53_1__TP53_DBD_1_Ser15p_; kAsTP53PCDKN1A*_cell__TP53_DBD_Ser15p_*_cell__CDKN1A_promoter_TP53_;
  R225: => _cell__CDKN1A_CCNE_A_B_Ser130u_; kSyCDKN1A_1;
  R226: _cell__FOXO_DBD_ + _cell__CDKN1B_promoter_FOXO_ => _cell__CDKN1B_promoter_FOXO_1__FOXO_DBD_1_; kAsFOXOPCDKN1B*_cell__FOXO_DBD_*_cell__CDKN1B_promoter_FOXO_;
  R227: => _cell__CDKN1B_CCNE_A_Thr187u_; kSyCDKN1B_1;
  R228: _cell__CDKN1A_promoter_TP53_1__TP53_DBD_1_Ser15p_ => _cell__TP53_DBD_Ser15p_ + _cell__CDKN1A_promoter_TP53_; kDiTP53PCDKN1A*_cell__CDKN1A_promoter_TP53_1__TP53_DBD_1_Ser15p_;
  R229: _cell__CDKN1A_promoter_TP53_1__TP53_DBD_1_Ser15p_ => _cell__CDKN1A_promoter_TP53_1__TP53_DBD_1_Ser15p_ + _cell__CDKN1A_CCNE_A_B_Ser130u_; kSyCDKN1A_2*_cell__CDKN1A_promoter_TP53_1__TP53_DBD_1_Ser15p_;
  R230: _cell__CDKN1A_CCNE_A_B_Ser130u_ => ; kDeCDKN1A_1*_cell__CDKN1A_CCNE_A_B_Ser130u_;
  R231: _cell__SKP2 + _cell__CDKN1A_CCNE_A_B_Ser130u_ => _cell__SKP2; kDeCDKN1A_2*_cell__SKP2*_cell__CDKN1A_CCNE_A_B_Ser130u_;
  R232: _cell__CCNA_CDKN1A_B_ + _cell__CDKN1A_CCNE_A_B_Ser130u_ => _cell__CCNA_CDKN1A_B_1__CDKN1A_CCNE_A_B_1_Ser130u_; kAsCdkn1aC*_cell__CCNA_CDKN1A_B_*_cell__CDKN1A_CCNE_A_B_Ser130u_;
  R233: _cell__CCNE_CDKN1A_B_ + _cell__CDKN1A_CCNE_A_B_Ser130u_ => _cell__CCNE_CDKN1A_B_1__CDKN1A_CCNE_A_B_1_Ser130u_; kAsCdkn1aC*_cell__CCNE_CDKN1A_B_*_cell__CDKN1A_CCNE_A_B_Ser130u_;
  R234: _cell__CCNB_CDK1_Thr14_Tyr15u_CDKN1A_ + _cell__CDKN1A_CCNE_A_B_Ser130u_ => _cell__CCNB_CDK1_Thr14_Tyr15u_CDKN1A_1__CDKN1A_CCNE_A_B_1_Ser130u_; kAsCdkn1aC*_cell__CCNB_CDK1_Thr14_Tyr15u_CDKN1A_*_cell__CDKN1A_CCNE_A_B_Ser130u_;
  R235: _cell__CCNB_CDK1_Thr14_Tyr15p_CDKN1A_ + _cell__CDKN1A_CCNE_A_B_Ser130u_ => _cell__CCNB_CDK1_Thr14_Tyr15p_CDKN1A_1__CDKN1A_CCNE_A_B_1_Ser130u_; kAsCdkn1aC*_cell__CCNB_CDK1_Thr14_Tyr15p_CDKN1A_*_cell__CDKN1A_CCNE_A_B_Ser130u_;
  R236: _cell__CCNE_CDKN1A_B_ + _cell__CDKN1A_CCNE_A_B_Ser130u_ => _cell__CCNE_CDKN1A_B_ + _cell__CDKN1A_CCNE_A_B_Ser130p_; kPhCDKN1AByCe*_cell__CCNE_CDKN1A_B_*_cell__CDKN1A_CCNE_A_B_Ser130u_;
  R237: _cell__CCNA_CDKN1A_B_ + _cell__CDKN1A_CCNE_A_B_Ser130u_ => _cell__CCNA_CDKN1A_B_ + _cell__CDKN1A_CCNE_A_B_Ser130p_; kPhCDKN1AByCa*_cell__CCNA_CDKN1A_B_*_cell__CDKN1A_CCNE_A_B_Ser130u_;
  R238: _cell__CCNB_CDK1_Thr14_Tyr15u_CDKN1A_ + _cell__CDKN1A_CCNE_A_B_Ser130u_ => _cell__CCNB_CDK1_Thr14_Tyr15u_CDKN1A_ + _cell__CDKN1A_CCNE_A_B_Ser130p_; kPhCDKN1AByCb*_cell__CCNB_CDK1_Thr14_Tyr15u_CDKN1A_*_cell__CDKN1A_CCNE_A_B_Ser130u_;
  R239: _cell__CDKN1B_promoter_FOXO_1__FOXO_DBD_1_ => _cell__FOXO_DBD_ + _cell__CDKN1B_promoter_FOXO_; kDiFOXOPCDKN1B*_cell__CDKN1B_promoter_FOXO_1__FOXO_DBD_1_;
  R240: _cell__CDKN1B_promoter_FOXO_1__FOXO_DBD_1_ => _cell__CDKN1B_promoter_FOXO_1__FOXO_DBD_1_ + _cell__CDKN1B_CCNE_A_Thr187u_; kSyCDKN1B_2*_cell__CDKN1B_promoter_FOXO_1__FOXO_DBD_1_;
  R241: _cell__CDKN1B_CCNE_A_Thr187u_ => ; kDeCDKN1B_1*_cell__CDKN1B_CCNE_A_Thr187u_;
  R242: _cell__SKP2 + _cell__CDKN1B_CCNE_A_Thr187u_ => _cell__SKP2; _rateLaw1*_cell__SKP2*_cell__CDKN1B_CCNE_A_Thr187u_;
  R243: _cell__CCNA_CDKN1A_B_ + _cell__CDKN1B_CCNE_A_Thr187u_ => _cell__CCNA_CDKN1A_B_1__CDKN1B_CCNE_A_1_Thr187u_; kAsCdkn1bC*_cell__CCNA_CDKN1A_B_*_cell__CDKN1B_CCNE_A_Thr187u_;
  R244: _cell__CCNE_CDKN1A_B_ + _cell__CDKN1B_CCNE_A_Thr187u_ => _cell__CCNE_CDKN1A_B_1__CDKN1B_CCNE_A_1_Thr187u_; kAsCdkn1bC*_cell__CCNE_CDKN1A_B_*_cell__CDKN1B_CCNE_A_Thr187u_;
  R245: _cell__CCNE_CDKN1A_B_ + _cell__CDKN1B_CCNE_A_Thr187u_ => _cell__CCNE_CDKN1A_B_ + _cell__CDKN1B_CCNE_A_Thr187p_; kPhCDKN1BByCe*_cell__CCNE_CDKN1A_B_*_cell__CDKN1B_CCNE_A_Thr187u_;
  R246: _cell__CCNA_CDKN1A_B_ + _cell__CDKN1B_CCNE_A_Thr187u_ => _cell__CCNA_CDKN1A_B_ + _cell__CDKN1B_CCNE_A_Thr187p_; kPhCDKN1BByCa*_cell__CCNA_CDKN1A_B_*_cell__CDKN1B_CCNE_A_Thr187u_;
  R247: _cell__CCNB_CDK1_Thr14_Tyr15u_CDKN1A_ + _cell__CDKN1B_CCNE_A_Thr187u_ => _cell__CCNB_CDK1_Thr14_Tyr15u_CDKN1A_ + _cell__CDKN1B_CCNE_A_Thr187p_; kPhCDKN1BByCb*_cell__CCNB_CDK1_Thr14_Tyr15u_CDKN1A_*_cell__CDKN1B_CCNE_A_Thr187u_;
  R248: _cell__CCNE_CDKN1A_B_1__CDKN1A_CCNE_A_B_1_Ser130u_ => _cell__CDKN1A_CCNE_A_B_Ser130u_; kDeCe*_cell__CCNE_CDKN1A_B_1__CDKN1A_CCNE_A_B_1_Ser130u_;
  R249: _cell__CCNE_CDKN1A_B_1__CDKN1B_CCNE_A_1_Thr187u_ => _cell__CDKN1B_CCNE_A_Thr187u_; kDeCe*_cell__CCNE_CDKN1A_B_1__CDKN1B_CCNE_A_1_Thr187u_;
  R250: _cell__CCNE_CDKN1A_B_ + _cell__CCNE_CDKN1A_B_1__CDKN1A_CCNE_A_B_1_Ser130u_ => _cell__CCNE_CDKN1A_B_ + _cell__CDKN1A_CCNE_A_B_Ser130u_; kPhCeE*_cell__CCNE_CDKN1A_B_*_cell__CCNE_CDKN1A_B_1__CDKN1A_CCNE_A_B_1_Ser130u_;
  R251: _cell__CCNE_CDKN1A_B_ + _cell__CCNE_CDKN1A_B_1__CDKN1B_CCNE_A_1_Thr187u_ => _cell__CCNE_CDKN1A_B_ + _cell__CDKN1B_CCNE_A_Thr187u_; kPhCeE*_cell__CCNE_CDKN1A_B_*_cell__CCNE_CDKN1A_B_1__CDKN1B_CCNE_A_1_Thr187u_;
  R252: _cell__CCNA_CDKN1A_B_1__CDKN1A_CCNE_A_B_1_Ser130u_ => _cell__CDKN1A_CCNE_A_B_Ser130u_; kDeCa1*_cell__CCNA_CDKN1A_B_1__CDKN1A_CCNE_A_B_1_Ser130u_;
  R253: _cell__CCNA_CDKN1A_B_1__CDKN1B_CCNE_A_1_Thr187u_ => _cell__CDKN1B_CCNE_A_Thr187u_; kDeCa1*_cell__CCNA_CDKN1A_B_1__CDKN1B_CCNE_A_1_Thr187u_;
  R254: _cell__CCNA_CDKN1A_B_ + _cell__CCNE_CDKN1A_B_1__CDKN1A_CCNE_A_B_1_Ser130u_ => _cell__CCNA_CDKN1A_B_ + _cell__CDKN1A_CCNE_A_B_Ser130u_; kPhCeA*_cell__CCNA_CDKN1A_B_*_cell__CCNE_CDKN1A_B_1__CDKN1A_CCNE_A_B_1_Ser130u_;
  R255: _cell__CCNA_CDKN1A_B_ + _cell__CCNE_CDKN1A_B_1__CDKN1B_CCNE_A_1_Thr187u_ => _cell__CCNA_CDKN1A_B_ + _cell__CDKN1B_CCNE_A_Thr187u_; kPhCeA*_cell__CCNA_CDKN1A_B_*_cell__CCNE_CDKN1A_B_1__CDKN1B_CCNE_A_1_Thr187u_;
  R256: _cell__APC_FBXO5_FZR1_CDC20_1_Ser355u__FZR1_APC_1_FBXO5_nTermu_ + _cell__CCNA_CDKN1A_B_1__CDKN1A_CCNE_A_B_1_Ser130u_ => _cell__APC_FBXO5_FZR1_CDC20_1_Ser355u__FZR1_APC_1_FBXO5_nTermu_ + _cell__CDKN1A_CCNE_A_B_Ser130u_; kDeCa2*_cell__APC_FBXO5_FZR1_CDC20_1_Ser355u__FZR1_APC_1_FBXO5_nTermu_*_cell__CCNA_CDKN1A_B_1__CDKN1A_CCNE_A_B_1_Ser130u_;
  R257: _cell__APC_FBXO5_FZR1_CDC20_1_Ser355p__FZR1_APC_1_FBXO5_nTermu_ + _cell__CCNA_CDKN1A_B_1__CDKN1A_CCNE_A_B_1_Ser130u_ => _cell__APC_FBXO5_FZR1_CDC20_1_Ser355p__FZR1_APC_1_FBXO5_nTermu_ + _cell__CDKN1A_CCNE_A_B_Ser130u_; kDeCa2*_cell__APC_FBXO5_FZR1_CDC20_1_Ser355p__FZR1_APC_1_FBXO5_nTermu_*_cell__CCNA_CDKN1A_B_1__CDKN1A_CCNE_A_B_1_Ser130u_;
  R258: _cell__APC_FBXO5_FZR1_CDC20_1_Ser355u__FZR1_APC_1_FBXO5_nTermu_ + _cell__CCNA_CDKN1A_B_1__CDKN1B_CCNE_A_1_Thr187u_ => _cell__APC_FBXO5_FZR1_CDC20_1_Ser355u__FZR1_APC_1_FBXO5_nTermu_ + _cell__CDKN1B_CCNE_A_Thr187u_; kDeCa2*_cell__APC_FBXO5_FZR1_CDC20_1_Ser355u__FZR1_APC_1_FBXO5_nTermu_*_cell__CCNA_CDKN1A_B_1__CDKN1B_CCNE_A_1_Thr187u_;
  R259: _cell__APC_FBXO5_FZR1_CDC20_1_Ser355p__FZR1_APC_1_FBXO5_nTermu_ + _cell__CCNA_CDKN1A_B_1__CDKN1B_CCNE_A_1_Thr187u_ => _cell__APC_FBXO5_FZR1_CDC20_1_Ser355p__FZR1_APC_1_FBXO5_nTermu_ + _cell__CDKN1B_CCNE_A_Thr187u_; kDeCa2*_cell__APC_FBXO5_FZR1_CDC20_1_Ser355p__FZR1_APC_1_FBXO5_nTermu_*_cell__CCNA_CDKN1A_B_1__CDKN1B_CCNE_A_1_Thr187u_;
  R260: _cell__APC_FBXO5_FZR1_CDC20_1_Ser355p__CDC20_APC_1_ + _cell__CCNA_CDKN1A_B_1__CDKN1A_CCNE_A_B_1_Ser130u_ => _cell__APC_FBXO5_FZR1_CDC20_1_Ser355p__CDC20_APC_1_ + _cell__CDKN1A_CCNE_A_B_Ser130u_; kDeCa3*_cell__APC_FBXO5_FZR1_CDC20_1_Ser355p__CDC20_APC_1_*_cell__CCNA_CDKN1A_B_1__CDKN1A_CCNE_A_B_1_Ser130u_;
  R261: _cell__APC_FBXO5_FZR1_CDC20_1_Ser355p__CDC20_APC_1_ + _cell__CCNA_CDKN1A_B_1__CDKN1B_CCNE_A_1_Thr187u_ => _cell__APC_FBXO5_FZR1_CDC20_1_Ser355p__CDC20_APC_1_ + _cell__CDKN1B_CCNE_A_Thr187u_; kDeCa3*_cell__APC_FBXO5_FZR1_CDC20_1_Ser355p__CDC20_APC_1_*_cell__CCNA_CDKN1A_B_1__CDKN1B_CCNE_A_1_Thr187u_;
  R262: _cell__CCNB_CDK1_Thr14_Tyr15u_CDKN1A_1__CDKN1A_CCNE_A_B_1_Ser130u_ => _cell__CDKN1A_CCNE_A_B_Ser130u_; kDeCb1*_cell__CCNB_CDK1_Thr14_Tyr15u_CDKN1A_1__CDKN1A_CCNE_A_B_1_Ser130u_;
  R263: _cell__CCNB_CDK1_Thr14_Tyr15p_CDKN1A_1__CDKN1A_CCNE_A_B_1_Ser130u_ => _cell__CDKN1A_CCNE_A_B_Ser130u_; kDeCb1*_cell__CCNB_CDK1_Thr14_Tyr15p_CDKN1A_1__CDKN1A_CCNE_A_B_1_Ser130u_;
  R264: _cell__APC_FBXO5_FZR1_CDC20_1_Ser355u__FZR1_APC_1_FBXO5_nTermu_ + _cell__CCNB_CDK1_Thr14_Tyr15u_CDKN1A_1__CDKN1A_CCNE_A_B_1_Ser130u_ => _cell__APC_FBXO5_FZR1_CDC20_1_Ser355u__FZR1_APC_1_FBXO5_nTermu_ + _cell__CDKN1A_CCNE_A_B_Ser130u_; kDeCb2*_cell__APC_FBXO5_FZR1_CDC20_1_Ser355u__FZR1_APC_1_FBXO5_nTermu_*_cell__CCNB_CDK1_Thr14_Tyr15u_CDKN1A_1__CDKN1A_CCNE_A_B_1_Ser130u_;
  R265: _cell__APC_FBXO5_FZR1_CDC20_1_Ser355p__FZR1_APC_1_FBXO5_nTermu_ + _cell__CCNB_CDK1_Thr14_Tyr15u_CDKN1A_1__CDKN1A_CCNE_A_B_1_Ser130u_ => _cell__APC_FBXO5_FZR1_CDC20_1_Ser355p__FZR1_APC_1_FBXO5_nTermu_ + _cell__CDKN1A_CCNE_A_B_Ser130u_; kDeCb2*_cell__APC_FBXO5_FZR1_CDC20_1_Ser355p__FZR1_APC_1_FBXO5_nTermu_*_cell__CCNB_CDK1_Thr14_Tyr15u_CDKN1A_1__CDKN1A_CCNE_A_B_1_Ser130u_;
  R266: _cell__APC_FBXO5_FZR1_CDC20_1_Ser355u__FZR1_APC_1_FBXO5_nTermu_ + _cell__CCNB_CDK1_Thr14_Tyr15p_CDKN1A_1__CDKN1A_CCNE_A_B_1_Ser130u_ => _cell__APC_FBXO5_FZR1_CDC20_1_Ser355u__FZR1_APC_1_FBXO5_nTermu_ + _cell__CDKN1A_CCNE_A_B_Ser130u_; kDeCb2*_cell__APC_FBXO5_FZR1_CDC20_1_Ser355u__FZR1_APC_1_FBXO5_nTermu_*_cell__CCNB_CDK1_Thr14_Tyr15p_CDKN1A_1__CDKN1A_CCNE_A_B_1_Ser130u_;
  R267: _cell__APC_FBXO5_FZR1_CDC20_1_Ser355p__FZR1_APC_1_FBXO5_nTermu_ + _cell__CCNB_CDK1_Thr14_Tyr15p_CDKN1A_1__CDKN1A_CCNE_A_B_1_Ser130u_ => _cell__APC_FBXO5_FZR1_CDC20_1_Ser355p__FZR1_APC_1_FBXO5_nTermu_ + _cell__CDKN1A_CCNE_A_B_Ser130u_; kDeCb2*_cell__APC_FBXO5_FZR1_CDC20_1_Ser355p__FZR1_APC_1_FBXO5_nTermu_*_cell__CCNB_CDK1_Thr14_Tyr15p_CDKN1A_1__CDKN1A_CCNE_A_B_1_Ser130u_;
  R268: _cell__APC_FBXO5_FZR1_CDC20_1_Ser355p__CDC20_APC_1_ + _cell__CCNB_CDK1_Thr14_Tyr15u_CDKN1A_1__CDKN1A_CCNE_A_B_1_Ser130u_ => _cell__APC_FBXO5_FZR1_CDC20_1_Ser355p__CDC20_APC_1_ + _cell__CDKN1A_CCNE_A_B_Ser130u_; kDeCb3*_cell__APC_FBXO5_FZR1_CDC20_1_Ser355p__CDC20_APC_1_*_cell__CCNB_CDK1_Thr14_Tyr15u_CDKN1A_1__CDKN1A_CCNE_A_B_1_Ser130u_;
  R269: _cell__APC_FBXO5_FZR1_CDC20_1_Ser355p__CDC20_APC_1_ + _cell__CCNB_CDK1_Thr14_Tyr15p_CDKN1A_1__CDKN1A_CCNE_A_B_1_Ser130u_ => _cell__APC_FBXO5_FZR1_CDC20_1_Ser355p__CDC20_APC_1_ + _cell__CDKN1A_CCNE_A_B_Ser130u_; kDeCb3*_cell__APC_FBXO5_FZR1_CDC20_1_Ser355p__CDC20_APC_1_*_cell__CCNB_CDK1_Thr14_Tyr15p_CDKN1A_1__CDKN1A_CCNE_A_B_1_Ser130u_;
  R270: _cell__WEE1_Ser123u_ + _cell__CCNB_CDK1_Thr14_Tyr15u_CDKN1A_1__CDKN1A_CCNE_A_B_1_Ser130u_ => _cell__WEE1_Ser123u_ + _cell__CCNB_CDK1_Thr14_Tyr15p_CDKN1A_1__CDKN1A_CCNE_A_B_1_Ser130u_; kWee2*_cell__WEE1_Ser123u_*_cell__CCNB_CDK1_Thr14_Tyr15u_CDKN1A_1__CDKN1A_CCNE_A_B_1_Ser130u_;
  R271: _cell__WEE1_Ser123p_ + _cell__CCNB_CDK1_Thr14_Tyr15u_CDKN1A_1__CDKN1A_CCNE_A_B_1_Ser130u_ => _cell__WEE1_Ser123p_ + _cell__CCNB_CDK1_Thr14_Tyr15p_CDKN1A_1__CDKN1A_CCNE_A_B_1_Ser130u_; kWee1*_cell__WEE1_Ser123p_*_cell__CCNB_CDK1_Thr14_Tyr15u_CDKN1A_1__CDKN1A_CCNE_A_B_1_Ser130u_;
  R272: _cell__CDC25_pSitesp_ + _cell__CCNB_CDK1_Thr14_Tyr15p_CDKN1A_1__CDKN1A_CCNE_A_B_1_Ser130u_ => _cell__CDC25_pSitesp_ + _cell__CCNB_CDK1_Thr14_Tyr15u_CDKN1A_1__CDKN1A_CCNE_A_B_1_Ser130u_; kCdc25_2*_cell__CDC25_pSitesp_*_cell__CCNB_CDK1_Thr14_Tyr15p_CDKN1A_1__CDKN1A_CCNE_A_B_1_Ser130u_;
  R273: _cell__CDC25_pSitesu_ + _cell__CCNB_CDK1_Thr14_Tyr15p_CDKN1A_1__CDKN1A_CCNE_A_B_1_Ser130u_ => _cell__CDC25_pSitesu_ + _cell__CCNB_CDK1_Thr14_Tyr15u_CDKN1A_1__CDKN1A_CCNE_A_B_1_Ser130u_; kCdc25_1*_cell__CDC25_pSitesu_*_cell__CCNB_CDK1_Thr14_Tyr15p_CDKN1A_1__CDKN1A_CCNE_A_B_1_Ser130u_;
  R274: _cell__CCNA_CDKN1A_B_1__CDKN1A_CCNE_A_B_1_Ser130u_ => _cell__CCNA_CDKN1A_B_; kDeCDKN1A_1*_cell__CCNA_CDKN1A_B_1__CDKN1A_CCNE_A_B_1_Ser130u_;
  R275: _cell__CCNE_CDKN1A_B_1__CDKN1A_CCNE_A_B_1_Ser130u_ => _cell__CCNE_CDKN1A_B_; kDeCDKN1A_1*_cell__CCNE_CDKN1A_B_1__CDKN1A_CCNE_A_B_1_Ser130u_;
  R276: _cell__CCNB_CDK1_Thr14_Tyr15u_CDKN1A_1__CDKN1A_CCNE_A_B_1_Ser130u_ => _cell__CCNB_CDK1_Thr14_Tyr15u_CDKN1A_; kDeCDKN1A_1*_cell__CCNB_CDK1_Thr14_Tyr15u_CDKN1A_1__CDKN1A_CCNE_A_B_1_Ser130u_;
  R277: _cell__CCNB_CDK1_Thr14_Tyr15p_CDKN1A_1__CDKN1A_CCNE_A_B_1_Ser130u_ => _cell__CCNB_CDK1_Thr14_Tyr15p_CDKN1A_; kDeCDKN1A_1*_cell__CCNB_CDK1_Thr14_Tyr15p_CDKN1A_1__CDKN1A_CCNE_A_B_1_Ser130u_;
  R278: _cell__CDKN1A_CCNE_A_B_Ser130p_ => ; kDeCDKN1A_1*_cell__CDKN1A_CCNE_A_B_Ser130p_;
  R279: _cell__SKP2 + _cell__CDKN1A_CCNE_A_B_Ser130p_ => _cell__SKP2; kDeCDKN1A_2*_cell__SKP2*_cell__CDKN1A_CCNE_A_B_Ser130p_;
  R280: _cell__SKP2 + _cell__CCNA_CDKN1A_B_1__CDKN1A_CCNE_A_B_1_Ser130u_ => _cell__CCNA_CDKN1A_B_ + _cell__SKP2; kDeCDKN1A_2*_cell__SKP2*_cell__CCNA_CDKN1A_B_1__CDKN1A_CCNE_A_B_1_Ser130u_;
  R281: _cell__SKP2 + _cell__CCNE_CDKN1A_B_1__CDKN1A_CCNE_A_B_1_Ser130u_ => _cell__CCNE_CDKN1A_B_ + _cell__SKP2; kDeCDKN1A_2*_cell__SKP2*_cell__CCNE_CDKN1A_B_1__CDKN1A_CCNE_A_B_1_Ser130u_;
  R282: _cell__SKP2 + _cell__CCNB_CDK1_Thr14_Tyr15u_CDKN1A_1__CDKN1A_CCNE_A_B_1_Ser130u_ => _cell__CCNB_CDK1_Thr14_Tyr15u_CDKN1A_ + _cell__SKP2; kDeCDKN1A_2*_cell__SKP2*_cell__CCNB_CDK1_Thr14_Tyr15u_CDKN1A_1__CDKN1A_CCNE_A_B_1_Ser130u_;
  R283: _cell__SKP2 + _cell__CCNB_CDK1_Thr14_Tyr15p_CDKN1A_1__CDKN1A_CCNE_A_B_1_Ser130u_ => _cell__CCNB_CDK1_Thr14_Tyr15p_CDKN1A_ + _cell__SKP2; kDeCDKN1A_2*_cell__SKP2*_cell__CCNB_CDK1_Thr14_Tyr15p_CDKN1A_1__CDKN1A_CCNE_A_B_1_Ser130u_;
  R284: _cell__CCNA_CDKN1A_B_1__CDKN1A_CCNE_A_B_1_Ser130u_ => _cell__CCNA_CDKN1A_B_ + _cell__CDKN1A_CCNE_A_B_Ser130u_; kDiCdkn1aC*_cell__CCNA_CDKN1A_B_1__CDKN1A_CCNE_A_B_1_Ser130u_;
  R285: _cell__CCNE_CDKN1A_B_1__CDKN1A_CCNE_A_B_1_Ser130u_ => _cell__CCNE_CDKN1A_B_ + _cell__CDKN1A_CCNE_A_B_Ser130u_; kDiCdkn1aC*_cell__CCNE_CDKN1A_B_1__CDKN1A_CCNE_A_B_1_Ser130u_;
  R286: _cell__CCNB_CDK1_Thr14_Tyr15u_CDKN1A_1__CDKN1A_CCNE_A_B_1_Ser130u_ => _cell__CCNB_CDK1_Thr14_Tyr15u_CDKN1A_ + _cell__CDKN1A_CCNE_A_B_Ser130u_; kDiCdkn1aC*_cell__CCNB_CDK1_Thr14_Tyr15u_CDKN1A_1__CDKN1A_CCNE_A_B_1_Ser130u_;
  R287: _cell__CCNB_CDK1_Thr14_Tyr15p_CDKN1A_1__CDKN1A_CCNE_A_B_1_Ser130u_ => _cell__CCNB_CDK1_Thr14_Tyr15p_CDKN1A_ + _cell__CDKN1A_CCNE_A_B_Ser130u_; kDiCdkn1aC*_cell__CCNB_CDK1_Thr14_Tyr15p_CDKN1A_1__CDKN1A_CCNE_A_B_1_Ser130u_;
  R288: _cell__CCNE_CDKN1A_B_ + _cell__CCNA_CDKN1A_B_1__CDKN1A_CCNE_A_B_1_Ser130u_ => _cell__CCNE_CDKN1A_B_ + _cell__CCNA_CDKN1A_B_ + _cell__CDKN1A_CCNE_A_B_Ser130p_; kPhCDKN1AByCe*_cell__CCNE_CDKN1A_B_*_cell__CCNA_CDKN1A_B_1__CDKN1A_CCNE_A_B_1_Ser130u_;
  R289: _cell__CCNE_CDKN1A_B_ + _cell__CCNE_CDKN1A_B_1__CDKN1A_CCNE_A_B_1_Ser130u_ => _cell__CCNE_CDKN1A_B_ + _cell__CCNE_CDKN1A_B_ + _cell__CDKN1A_CCNE_A_B_Ser130p_; kPhCDKN1AByCe*_cell__CCNE_CDKN1A_B_*_cell__CCNE_CDKN1A_B_1__CDKN1A_CCNE_A_B_1_Ser130u_;
  R290: _cell__CCNE_CDKN1A_B_ + _cell__CCNB_CDK1_Thr14_Tyr15u_CDKN1A_1__CDKN1A_CCNE_A_B_1_Ser130u_ => _cell__CCNE_CDKN1A_B_ + _cell__CCNB_CDK1_Thr14_Tyr15u_CDKN1A_ + _cell__CDKN1A_CCNE_A_B_Ser130p_; kPhCDKN1AByCe*_cell__CCNE_CDKN1A_B_*_cell__CCNB_CDK1_Thr14_Tyr15u_CDKN1A_1__CDKN1A_CCNE_A_B_1_Ser130u_;
  R291: _cell__CCNE_CDKN1A_B_ + _cell__CCNB_CDK1_Thr14_Tyr15p_CDKN1A_1__CDKN1A_CCNE_A_B_1_Ser130u_ => _cell__CCNE_CDKN1A_B_ + _cell__CCNB_CDK1_Thr14_Tyr15p_CDKN1A_ + _cell__CDKN1A_CCNE_A_B_Ser130p_; kPhCDKN1AByCe*_cell__CCNE_CDKN1A_B_*_cell__CCNB_CDK1_Thr14_Tyr15p_CDKN1A_1__CDKN1A_CCNE_A_B_1_Ser130u_;
  R292: _cell__CCNA_CDKN1A_B_ + _cell__CCNA_CDKN1A_B_1__CDKN1A_CCNE_A_B_1_Ser130u_ => _cell__CCNA_CDKN1A_B_ + _cell__CCNA_CDKN1A_B_ + _cell__CDKN1A_CCNE_A_B_Ser130p_; kPhCDKN1AByCa*_cell__CCNA_CDKN1A_B_*_cell__CCNA_CDKN1A_B_1__CDKN1A_CCNE_A_B_1_Ser130u_;
  R293: _cell__CCNA_CDKN1A_B_ + _cell__CCNE_CDKN1A_B_1__CDKN1A_CCNE_A_B_1_Ser130u_ => _cell__CCNE_CDKN1A_B_ + _cell__CCNA_CDKN1A_B_ + _cell__CDKN1A_CCNE_A_B_Ser130p_; kPhCDKN1AByCa*_cell__CCNA_CDKN1A_B_*_cell__CCNE_CDKN1A_B_1__CDKN1A_CCNE_A_B_1_Ser130u_;
  R294: _cell__CCNA_CDKN1A_B_ + _cell__CCNB_CDK1_Thr14_Tyr15u_CDKN1A_1__CDKN1A_CCNE_A_B_1_Ser130u_ => _cell__CCNA_CDKN1A_B_ + _cell__CCNB_CDK1_Thr14_Tyr15u_CDKN1A_ + _cell__CDKN1A_CCNE_A_B_Ser130p_; kPhCDKN1AByCa*_cell__CCNA_CDKN1A_B_*_cell__CCNB_CDK1_Thr14_Tyr15u_CDKN1A_1__CDKN1A_CCNE_A_B_1_Ser130u_;
  R295: _cell__CCNA_CDKN1A_B_ + _cell__CCNB_CDK1_Thr14_Tyr15p_CDKN1A_1__CDKN1A_CCNE_A_B_1_Ser130u_ => _cell__CCNA_CDKN1A_B_ + _cell__CCNB_CDK1_Thr14_Tyr15p_CDKN1A_ + _cell__CDKN1A_CCNE_A_B_Ser130p_; kPhCDKN1AByCa*_cell__CCNA_CDKN1A_B_*_cell__CCNB_CDK1_Thr14_Tyr15p_CDKN1A_1__CDKN1A_CCNE_A_B_1_Ser130u_;
  R296: _cell__CCNB_CDK1_Thr14_Tyr15u_CDKN1A_ + _cell__CCNA_CDKN1A_B_1__CDKN1A_CCNE_A_B_1_Ser130u_ => _cell__CCNA_CDKN1A_B_ + _cell__CCNB_CDK1_Thr14_Tyr15u_CDKN1A_ + _cell__CDKN1A_CCNE_A_B_Ser130p_; kPhCDKN1AByCb*_cell__CCNB_CDK1_Thr14_Tyr15u_CDKN1A_*_cell__CCNA_CDKN1A_B_1__CDKN1A_CCNE_A_B_1_Ser130u_;
  R297: _cell__CCNB_CDK1_Thr14_Tyr15u_CDKN1A_ + _cell__CCNE_CDKN1A_B_1__CDKN1A_CCNE_A_B_1_Ser130u_ => _cell__CCNE_CDKN1A_B_ + _cell__CCNB_CDK1_Thr14_Tyr15u_CDKN1A_ + _cell__CDKN1A_CCNE_A_B_Ser130p_; kPhCDKN1AByCb*_cell__CCNB_CDK1_Thr14_Tyr15u_CDKN1A_*_cell__CCNE_CDKN1A_B_1__CDKN1A_CCNE_A_B_1_Ser130u_;
  R298: _cell__CCNB_CDK1_Thr14_Tyr15u_CDKN1A_ + _cell__CCNB_CDK1_Thr14_Tyr15u_CDKN1A_1__CDKN1A_CCNE_A_B_1_Ser130u_ => _cell__CCNB_CDK1_Thr14_Tyr15u_CDKN1A_ + _cell__CCNB_CDK1_Thr14_Tyr15u_CDKN1A_ + _cell__CDKN1A_CCNE_A_B_Ser130p_; kPhCDKN1AByCb*_cell__CCNB_CDK1_Thr14_Tyr15u_CDKN1A_*_cell__CCNB_CDK1_Thr14_Tyr15u_CDKN1A_1__CDKN1A_CCNE_A_B_1_Ser130u_;
  R299: _cell__CCNB_CDK1_Thr14_Tyr15u_CDKN1A_ + _cell__CCNB_CDK1_Thr14_Tyr15p_CDKN1A_1__CDKN1A_CCNE_A_B_1_Ser130u_ => _cell__CCNB_CDK1_Thr14_Tyr15u_CDKN1A_ + _cell__CCNB_CDK1_Thr14_Tyr15p_CDKN1A_ + _cell__CDKN1A_CCNE_A_B_Ser130p_; kPhCDKN1AByCb*_cell__CCNB_CDK1_Thr14_Tyr15u_CDKN1A_*_cell__CCNB_CDK1_Thr14_Tyr15p_CDKN1A_1__CDKN1A_CCNE_A_B_1_Ser130u_;
  R300: _cell__CDKN1A_CCNE_A_B_Ser130p_ => _cell__CDKN1A_CCNE_A_B_Ser130u_; kDpCDKN1A*_cell__CDKN1A_CCNE_A_B_Ser130p_;
  R301: _cell__CCNA_CDKN1A_B_1__CDKN1B_CCNE_A_1_Thr187u_ => _cell__CCNA_CDKN1A_B_; kDeCDKN1B_1*_cell__CCNA_CDKN1A_B_1__CDKN1B_CCNE_A_1_Thr187u_;
  R302: _cell__CCNE_CDKN1A_B_1__CDKN1B_CCNE_A_1_Thr187u_ => _cell__CCNE_CDKN1A_B_; kDeCDKN1B_1*_cell__CCNE_CDKN1A_B_1__CDKN1B_CCNE_A_1_Thr187u_;
  R303: _cell__CDKN1B_CCNE_A_Thr187p_ => ; kDeCDKN1B_1*_cell__CDKN1B_CCNE_A_Thr187p_;
  R304: _cell__SKP2 + _cell__CDKN1B_CCNE_A_Thr187p_ => _cell__SKP2; kDeCDKN1B_2*_cell__SKP2*_cell__CDKN1B_CCNE_A_Thr187p_;
  R305: _cell__SKP2 + _cell__CCNA_CDKN1A_B_1__CDKN1B_CCNE_A_1_Thr187u_ => _cell__CCNA_CDKN1A_B_ + _cell__SKP2; _rateLaw1*_cell__SKP2*_cell__CCNA_CDKN1A_B_1__CDKN1B_CCNE_A_1_Thr187u_;
  R306: _cell__SKP2 + _cell__CCNE_CDKN1A_B_1__CDKN1B_CCNE_A_1_Thr187u_ => _cell__CCNE_CDKN1A_B_ + _cell__SKP2; _rateLaw1*_cell__SKP2*_cell__CCNE_CDKN1A_B_1__CDKN1B_CCNE_A_1_Thr187u_;
  R307: _cell__CCNA_CDKN1A_B_ + _cell__CDKN1B_CCNE_A_Thr187p_ => _cell__CCNA_CDKN1A_B_1__CDKN1B_CCNE_A_1_Thr187p_; kAsCdkn1bC*_cell__CCNA_CDKN1A_B_*_cell__CDKN1B_CCNE_A_Thr187p_;
  R308: _cell__CCNA_CDKN1A_B_1__CDKN1B_CCNE_A_1_Thr187u_ => _cell__CCNA_CDKN1A_B_ + _cell__CDKN1B_CCNE_A_Thr187u_; kDiCdkn1bC*_cell__CCNA_CDKN1A_B_1__CDKN1B_CCNE_A_1_Thr187u_;
  R309: _cell__CCNE_CDKN1A_B_ + _cell__CDKN1B_CCNE_A_Thr187p_ => _cell__CCNE_CDKN1A_B_1__CDKN1B_CCNE_A_1_Thr187p_; kAsCdkn1bC*_cell__CCNE_CDKN1A_B_*_cell__CDKN1B_CCNE_A_Thr187p_;
  R310: _cell__CCNE_CDKN1A_B_1__CDKN1B_CCNE_A_1_Thr187u_ => _cell__CCNE_CDKN1A_B_ + _cell__CDKN1B_CCNE_A_Thr187u_; kDiCdkn1bC*_cell__CCNE_CDKN1A_B_1__CDKN1B_CCNE_A_1_Thr187u_;
  R311: _cell__CCNE_CDKN1A_B_ + _cell__CCNA_CDKN1A_B_1__CDKN1B_CCNE_A_1_Thr187u_ => _cell__CCNE_CDKN1A_B_ + _cell__CCNA_CDKN1A_B_1__CDKN1B_CCNE_A_1_Thr187p_; kPhCDKN1BByCe*_cell__CCNE_CDKN1A_B_*_cell__CCNA_CDKN1A_B_1__CDKN1B_CCNE_A_1_Thr187u_;
  R312: _cell__CCNE_CDKN1A_B_ + _cell__CCNE_CDKN1A_B_1__CDKN1B_CCNE_A_1_Thr187u_ => _cell__CCNE_CDKN1A_B_ + _cell__CCNE_CDKN1A_B_1__CDKN1B_CCNE_A_1_Thr187p_; kPhCDKN1BByCe*_cell__CCNE_CDKN1A_B_*_cell__CCNE_CDKN1A_B_1__CDKN1B_CCNE_A_1_Thr187u_;
  R313: _cell__CCNA_CDKN1A_B_ + _cell__CCNA_CDKN1A_B_1__CDKN1B_CCNE_A_1_Thr187u_ => _cell__CCNA_CDKN1A_B_ + _cell__CCNA_CDKN1A_B_1__CDKN1B_CCNE_A_1_Thr187p_; kPhCDKN1BByCa*_cell__CCNA_CDKN1A_B_*_cell__CCNA_CDKN1A_B_1__CDKN1B_CCNE_A_1_Thr187u_;
  R314: _cell__CCNA_CDKN1A_B_ + _cell__CCNE_CDKN1A_B_1__CDKN1B_CCNE_A_1_Thr187u_ => _cell__CCNA_CDKN1A_B_ + _cell__CCNE_CDKN1A_B_1__CDKN1B_CCNE_A_1_Thr187p_; kPhCDKN1BByCa*_cell__CCNA_CDKN1A_B_*_cell__CCNE_CDKN1A_B_1__CDKN1B_CCNE_A_1_Thr187u_;
  R315: _cell__CCNB_CDK1_Thr14_Tyr15u_CDKN1A_ + _cell__CCNA_CDKN1A_B_1__CDKN1B_CCNE_A_1_Thr187u_ => _cell__CCNB_CDK1_Thr14_Tyr15u_CDKN1A_ + _cell__CCNA_CDKN1A_B_1__CDKN1B_CCNE_A_1_Thr187p_; kPhCDKN1BByCb*_cell__CCNB_CDK1_Thr14_Tyr15u_CDKN1A_*_cell__CCNA_CDKN1A_B_1__CDKN1B_CCNE_A_1_Thr187u_;
  R316: _cell__CCNB_CDK1_Thr14_Tyr15u_CDKN1A_ + _cell__CCNE_CDKN1A_B_1__CDKN1B_CCNE_A_1_Thr187u_ => _cell__CCNB_CDK1_Thr14_Tyr15u_CDKN1A_ + _cell__CCNE_CDKN1A_B_1__CDKN1B_CCNE_A_1_Thr187p_; kPhCDKN1BByCb*_cell__CCNB_CDK1_Thr14_Tyr15u_CDKN1A_*_cell__CCNE_CDKN1A_B_1__CDKN1B_CCNE_A_1_Thr187u_;
  R317: _cell__CDKN1B_CCNE_A_Thr187p_ => _cell__CDKN1B_CCNE_A_Thr187u_; kDpCDKN1B*_cell__CDKN1B_CCNE_A_Thr187p_;
  R318: _cell__CCNE_CDKN1A_B_1__CDKN1B_CCNE_A_1_Thr187p_ => _cell__CDKN1B_CCNE_A_Thr187p_; kDeCe*_cell__CCNE_CDKN1A_B_1__CDKN1B_CCNE_A_1_Thr187p_;
  R319: _cell__CCNE_CDKN1A_B_ + _cell__CCNE_CDKN1A_B_1__CDKN1B_CCNE_A_1_Thr187p_ => _cell__CCNE_CDKN1A_B_ + _cell__CDKN1B_CCNE_A_Thr187p_; kPhCeE*_cell__CCNE_CDKN1A_B_*_cell__CCNE_CDKN1A_B_1__CDKN1B_CCNE_A_1_Thr187p_;
  R320: _cell__CCNA_CDKN1A_B_1__CDKN1B_CCNE_A_1_Thr187p_ => _cell__CDKN1B_CCNE_A_Thr187p_; kDeCa1*_cell__CCNA_CDKN1A_B_1__CDKN1B_CCNE_A_1_Thr187p_;
  R321: _cell__CCNA_CDKN1A_B_ + _cell__CCNE_CDKN1A_B_1__CDKN1B_CCNE_A_1_Thr187p_ => _cell__CCNA_CDKN1A_B_ + _cell__CDKN1B_CCNE_A_Thr187p_; kPhCeA*_cell__CCNA_CDKN1A_B_*_cell__CCNE_CDKN1A_B_1__CDKN1B_CCNE_A_1_Thr187p_;
  R322: _cell__APC_FBXO5_FZR1_CDC20_1_Ser355u__FZR1_APC_1_FBXO5_nTermu_ + _cell__CCNA_CDKN1A_B_1__CDKN1B_CCNE_A_1_Thr187p_ => _cell__APC_FBXO5_FZR1_CDC20_1_Ser355u__FZR1_APC_1_FBXO5_nTermu_ + _cell__CDKN1B_CCNE_A_Thr187p_; kDeCa2*_cell__APC_FBXO5_FZR1_CDC20_1_Ser355u__FZR1_APC_1_FBXO5_nTermu_*_cell__CCNA_CDKN1A_B_1__CDKN1B_CCNE_A_1_Thr187p_;
  R323: _cell__APC_FBXO5_FZR1_CDC20_1_Ser355p__FZR1_APC_1_FBXO5_nTermu_ + _cell__CCNA_CDKN1A_B_1__CDKN1B_CCNE_A_1_Thr187p_ => _cell__APC_FBXO5_FZR1_CDC20_1_Ser355p__FZR1_APC_1_FBXO5_nTermu_ + _cell__CDKN1B_CCNE_A_Thr187p_; kDeCa2*_cell__APC_FBXO5_FZR1_CDC20_1_Ser355p__FZR1_APC_1_FBXO5_nTermu_*_cell__CCNA_CDKN1A_B_1__CDKN1B_CCNE_A_1_Thr187p_;
  R324: _cell__APC_FBXO5_FZR1_CDC20_1_Ser355p__CDC20_APC_1_ + _cell__CCNA_CDKN1A_B_1__CDKN1B_CCNE_A_1_Thr187p_ => _cell__APC_FBXO5_FZR1_CDC20_1_Ser355p__CDC20_APC_1_ + _cell__CDKN1B_CCNE_A_Thr187p_; kDeCa3*_cell__APC_FBXO5_FZR1_CDC20_1_Ser355p__CDC20_APC_1_*_cell__CCNA_CDKN1A_B_1__CDKN1B_CCNE_A_1_Thr187p_;
  R325: _cell__CCNA_CDKN1A_B_1__CDKN1B_CCNE_A_1_Thr187p_ => _cell__CCNA_CDKN1A_B_; kDeCDKN1B_1*_cell__CCNA_CDKN1A_B_1__CDKN1B_CCNE_A_1_Thr187p_;
  R326: _cell__CCNE_CDKN1A_B_1__CDKN1B_CCNE_A_1_Thr187p_ => _cell__CCNE_CDKN1A_B_; kDeCDKN1B_1*_cell__CCNE_CDKN1A_B_1__CDKN1B_CCNE_A_1_Thr187p_;
  R327: _cell__SKP2 + _cell__CCNA_CDKN1A_B_1__CDKN1B_CCNE_A_1_Thr187p_ => _cell__CCNA_CDKN1A_B_ + _cell__SKP2; kDeCDKN1B_2*_cell__SKP2*_cell__CCNA_CDKN1A_B_1__CDKN1B_CCNE_A_1_Thr187p_;
  R328: _cell__SKP2 + _cell__CCNE_CDKN1A_B_1__CDKN1B_CCNE_A_1_Thr187p_ => _cell__CCNE_CDKN1A_B_ + _cell__SKP2; kDeCDKN1B_2*_cell__SKP2*_cell__CCNE_CDKN1A_B_1__CDKN1B_CCNE_A_1_Thr187p_;
  R329: _cell__CCNA_CDKN1A_B_1__CDKN1B_CCNE_A_1_Thr187p_ => _cell__CCNA_CDKN1A_B_ + _cell__CDKN1B_CCNE_A_Thr187p_; kDiCdkn1bC*_cell__CCNA_CDKN1A_B_1__CDKN1B_CCNE_A_1_Thr187p_;
  R330: _cell__CCNE_CDKN1A_B_1__CDKN1B_CCNE_A_1_Thr187p_ => _cell__CCNE_CDKN1A_B_ + _cell__CDKN1B_CCNE_A_Thr187p_; kDiCdkn1bC*_cell__CCNE_CDKN1A_B_1__CDKN1B_CCNE_A_1_Thr187p_;
  R331: _cell__CCNA_CDKN1A_B_1__CDKN1B_CCNE_A_1_Thr187p_ => _cell__CCNA_CDKN1A_B_1__CDKN1B_CCNE_A_1_Thr187u_; kDpCDKN1B*_cell__CCNA_CDKN1A_B_1__CDKN1B_CCNE_A_1_Thr187p_;
  R332: _cell__CCNE_CDKN1A_B_1__CDKN1B_CCNE_A_1_Thr187p_ => _cell__CCNE_CDKN1A_B_1__CDKN1B_CCNE_A_1_Thr187u_; kDpCDKN1B*_cell__CCNE_CDKN1A_B_1__CDKN1B_CCNE_A_1_Thr187p_;

  // Unit definitions:
  unit volume = litre;
  unit substance = mole;
  unit area = metre^2;
end
